kWh := kW*hr
kmol := 1000 mol
B_HFO := 3.4
kJ := 1000 J
MWh := kWh*10^3
α := 0.00075 K^-1
R_m := 8.314472 J/(mol*K)
var := W
MJ := 10^6 J
dm := 0.1 m
VA := W
kg_oil := kg
degC := °C
g := 9.817 m/s^2
kVA := kV*A
kg_air := kg
μWb := 10^-6 Wb
∡(x) := arg(x)
m_air := m^3
mWb := 10^-3 Wb
ρ_vand := 980 kg/m^3
mΩ := 10^-3 Ω
m_oil := m^3
μN := 10^-6 N
µF := 10^-6 F
pct := 0.01
kr := 1
stk := 1
ρ_luft := 1.2 kg/m^3
kvar := 10^3 var
rpm := min^-1
HK := 0.736 kW
µε := 10^-6
mH2O := 9806.383 Pa
μS := 10^-6 S
øre := kr/100
mT := 10^-3 T
mmH2O := 10^-3 mH2O
rps := s^-1
mN := 10^-3 N
mmHg := 133.322 Pa
mF := 10^-3 F
cSt := mm^2/s
MVA := 10^6 VA
sømil := knot*hr
Nm := N*m
Mvar := 10^6 var
μT := 10^-6 T
kNm := kN*m
C_p.vand := 4.2 kJ/(kg*K)
mbar := 10^-3 bar
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U_n := 10 kV  # TN-system.
S_KN.max := 225 MVA
φ_KN.max := acos(0.11)
S_KN.min := 175 MVA
φ_KN.min := acos(0.2)
I'_linje := 180 A
t'_linje := 1.5 s
l_A := 8 km
l_B := 3 km
I_J := 25 A
R_tm := 2 K*m/W
S_T := 500 kVA
U_1N := 10 kV
U_2N := 0.4 kV
U_f := U_2N/sqrt(3) = 0.23094 kV  # à
P_Cu.T := 4.88 kW
P_0 := 1.16 kW
e_k.T := 4%
# Generelle beregninger:
Z_net.min := (U_n^2/S_KN.max) ∠ φ_KN.max = (48.8889 + 441.747i) mΩ
Z_net.max := (U_n^2/S_KN.min) ∠ φ_KN.min = (114.286 + 559.883i) mΩ
r_150.Al := 0.206 Ω/km
x_150.Al := 0.093 Ω/km
Z_150.Al.min := l_B*(r_150.Al + 1j*x_150.Al) = (0.618 + 0.279i) Ω
Z_150.Al.max := l_A*(r_150.Al + 1j*x_150.Al) = (1.648 + 0.744i) Ω
Z_1.T := (U_1N^2*e_k.T/S_T) ∠ acos(P_Cu.T/(S_T*e_k.T)) = (1.952 + 7.7582i) Ω
I_1.T := S_T/(U_1N*sqrt(3)) = 28.8675 A
n := U_1N/U_2N = 25
I_2.T := I_1.T*n = 721.688 A  # ELLER:
I_2.T := S_T/(U_2N*sqrt(3)) = 721.688 A
I_T.inrush := 15*I_1.T = 433.013 A
# 1.1 Afklar, hvorvidt ringforbindelsens kabel er kortslutningsbeskyttet med de aktuelle relæindstillinger. Giv om nødvendigt forslag til korrektion af indstillinger.
I_K3F.max.for := U_n/(Z_net.min*sqrt(3)) = (1.42894 - 12.9116i) kA
I_K2F.max.for := sqrt(3)/2*|I_K3F.max.for| = 11.25 kA
I_K1s.fase := 14.2 kA*sqrt(s)
I_K1s.skærm := 5 kA*sqrt(s)
t'_linje = 1.5 s
t_e := 0.1 s
|I_K3F.max.for|*sqrt(t'_linje + t_e) = 16.4317 kA*s^(1/2)
|I_K3F.max.for|*sqrt(t'_linje + t_e) ≤ I_K1s.fase = 0  # IKKE OK.
# IKKE OK.
|I_K2F.max.for|*sqrt(t'_linje + t_e) = 14.2302 kA*s^(1/2)
|I_K2F.max.for|*sqrt(t'_linje + t_e) ≤ I_K1s.skærm = 0
# Kablet er IKKE kortslutningsbeskyttet.
# Det er ikke nødvendigt at kontrollere for I_K3F.min.for, da I'_linje = 180 A er stillet lavere end I_Z.150 := 310 A.
# For at kunne kortslutningsbeskytte kablet, sættes I''_linje == ON, og indstilles på en værdi højere end transformerens ''inrush''-strøm. t''_linje indstilles lavere end t_skærm.max , således at kablet er kortslutningsbeskyttet:
I_T.inrush = 433.013 A
I''_linje := 500 A
I_T.inrush ≤ I''_linje = 1  # OK.
t_skærm.max := |(I_K1s.skærm/I_K2F.max.for)^2| - t_e = 0.0975309 s  # à  # Så t''_linje indstilles på t''_linje := 0.09 s
|I_K3F.max.for|*sqrt(t''_linje + t_e) = 5.66238 kA*s^(1/2)
|I_K3F.max.for|*sqrt(t''_linje + t_e) ≤ I_K1s.fase = 1  # OK.
|I_K2F.max.for|*sqrt(t''_linje + t_e) = 4.90376 kA*s^(1/2)
|I_K2F.max.for|*sqrt(t''_linje + t_e) ≤ I_K1s.skærm = 1  # OK.
# Så er kablet kortslutningsbeskyttet.
I'_linje = 180 A
t'_linje = 1.5 s
I''_linje = 500 A
t''_linje = 90 ms
# 1.2 Beregn største og mindste kortslutningsstrøm og tilhørende effektfaktor på sekundær-siden af transformer -T5. I beregninger forudsættes nominelt spændingsniveau.
# Største kortslutningsstrøm:
I'_K3F.max.T.LV := U_n/((Z_net.min + Z_150.Al.min + Z_1.T)*sqrt(3)) = (191.999 - 621.619i) A
I_K3F.max.T.LV := I'_K3F.max.T.LV*n = (4.79998 - 15.5405i) kA
cos(arg(I_K3F.max.T.LV)) = 0.295113
S_KN.max.T.LV := (conj(I'_K3F.max.T.LV)*n)*U_2N*sqrt(3) = (3.32552 + 10.7668i) MVA
# Mindste kortslutningsstrøm:
I'_K2F.min.T.LV := U_n/(2*(Z_net.max + Z_150.Al.max + Z_1.T)) = (193.619 - 472.391i) A
I_K2F.min.T.LV := I'_K2F.min.T.LV*n = (4.84048 - 11.8098i) kA
cos(arg(I_K2F.min.T.LV)) = 0.379251
S_KN.min.T.LV := conj(I_K2F.min.T.LV)*U_2N*sqrt(3) = (3.35358 + 8.18204i) MVA
# ELLER:
I'_KFPE.N.min.T.LV := U_n/((Z_net.max + Z_150.Al.max + Z_1.T)*sqrt(3)*sqrt(3)) = (129.079 - 314.927i) A
I_KFPE.N.min.T.LV := I'_KFPE.N.min.T.LV*n*sqrt(3) = (5.5893 - 13.6367i) kA
I_K2F.min.T.LV := I_KFPE.N.min.T.LV*sqrt(3)/2 = (4.84048 - 11.8098i) kA
# 1.3 Foretag valg af strømtransformer, konstanttidsrelæ og angiv forslag til indstilling af konstanttidsrelæet til transformerbeskyttelsen af -T5.
# Der regnes med, at transformeren skal kunne belastes med 100%:
# Valg af relæ:  ABB REF615
# Valg af relæets mærkestrøm:  I_n.relæ := 5 A
# k_i:
I_1.ki ≥ 100%*I_1.T
100%*I_1.T = 28.8675 A
I_1.ki := 50 A
# à
k_i := 50/5
I'_relæ := 100%*I_1.T/(k_i*I_n.relæ) = 0.57735
# à
I'_relæ := 0.6
# à
I'_T1 := I'_relæ*k_i*I_n.relæ = 30 A
# For at være sikker på selektivitet imellem linje- og transformerrelæet, ønskes der en Δt på mindst 0,2 s:
# Δt := 0.2 s
t'_linje = 1.5 s
t'_T := t'_linje - Δt = 1.3 s
# à
t'_T := 1 s
U_n = 10 kV
I_K2F.min.T.HV := (U_n/((Z_net.max + Z_150.Al.max)*sqrt(3)))*sqrt(3)/2 = (1.83351 - 1.35658i) kA
# ELLER:
I_K2F.min.T.HV := U_n/(2*(Z_net.max + Z_150.Al.max)) = (1.83351 - 1.35658i) kA
I'_K3F.max.T.LV = (191.999 - 621.619i) A
I''_relæ := |I'_K3F.max.T.LV|/(k_i*I_n.relæ) = 13.0119  # à
I''_relæ := 15  # à
I''_T2 := I''_relæ*k_i*I_n.relæ = 750 A
|I_K2F.min.T.HV|*0.75 = 1.71061 kA
I''_T2 = 750 A
I_T.inrush = 433.013 A
|I_K2F.min.T.HV|*0.75 ≥ I''_T2 ≥ I_T.inrush and |I'_K3F.max.T.LV| = 1  # OK.
t''_T := 0.04 s  # Pga. personsikkerhed så mindst som muligt.
# 1.4 Dimensioner beskyttelses-, og fællesjord for transformerstationen, -T5 og beregn i den sammenhæng også den største tilladelige overgangsmodstand for jordelektrode-systemet.
I_K2F.max.T.HV := (U_n/((Z_net.min + Z_150.Al.min)*sqrt(3)))*sqrt(3)/2 = (3.45819 - 3.73747i) kA
I_KFPE.N.max.T.LV := I_K3F.max.T.LV = (4.79998 - 15.5405i) kA
k := 226*A*sqrt(s)/mm^2
Θ_f := 300
Θ_i := 35
β := 234.5
t_e = 0.1 s
t''_linje = 0.09 s
t'_T = 1 s
# Min. krav ifølge DS/EN 50522 pkt. 5.2.2 er 16 mm^2
S_BJ := |I_K2F.max.T.HV|/k*sqrt((t''_linje + t_e)/ln((Θ_f + β)/(Θ_i + β))) = 11.8681 mm^2  # à
S_BJ := 16 mm^2
# NOTE: Hvis der regnes med relæstid, så skal der regnes med I_K2F.max, og hvis der regnes med sikringstid, så skal regnes med I_K2F.min.
S_DJ := |I_KFPE.N.max.T.LV|/k*sqrt((t'_T + t_e)/ln((Θ_f + β)/(Θ_i + β))) = 91.2155 mm^2  # à
S_DJ := 95 mm^2
S_jordskinne ≥ S_BJ and S_DJ == 91.215 mm^2
# à
S_jordskinne := 20 mm^2*5 = 100 mm^2
# Da det er TN-system:
U_TP := 80 V
I_J = 25 A
R_E.T := U_TP/I_J = 3.2 Ω
# 1.5 Tegn et én-stregskema over transformerstationen -T5 og påfør de fundne komponenter og indstillede værdier fra de ovenstående spørgsmål 1.1-1.4.
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# OPGAVE 2
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S_KN := 280 MVA
φ_KN := acot(0.18)
S_T := 1000 kVA
U_1N := 10 kV
U_2N := 0.4 kV
U_f := U_2N/sqrt(3) = 230.94 V
P_0.T := 1500 W
P_Cu.T := 8800 W
e_k.T := 6%
sf_A1 := 0.7
U_n := 400 V
Q_batt := 7.6 kvar  # TN-S-system.
# Generelle beregninger:
Z_net := (U_n^2/S_KN) ∠ φ_KN = (0.10123 + 0.56239i) mΩ
Z_2.T := (U_2N^2*e_k.T/S_T) ∠ acos(P_Cu.T/(S_T*e_k.T)) = (1.408 + 9.49619i) mΩ
I_1.T := S_T/(U_1N*sqrt(3)) = 57.735 A
n := U_1N/U_2N = 25
I_2.T := I_1.T*n = 1.44338 kA  # ELLER:
I_2.T := S_T/(U_2N*sqrt(3)) = 1.44338 kA
I_T.inrush := 15*I_1.T = 866.025 A
# Belastninger under tavle -A1:
# Tavle -A2:
I_MA1 := 125 A ∠ -acos(0.89)
I_MA1.start := (|I_MA1| ∠ -75°)*5 = (161.762 - 603.704i) A
I_MA1.inrush := (|I_MA1.start| ∠ 0°)*2 = 1250 A
I_ab1.A2 := 24 A ∠ -acos(0.88)
S_ab2.A2 := 325 kVA ∠ acos(0.8)
I_ab2.A2 := conj(S_ab2.A2)/(sqrt(3)*U_n) = (375.278 - 281.458i) A
I_A2 := I_MA1 + I_ab1.A2 + I_ab2.A2 = (507.648 - 349.853i) A
t_start := 5 s
I_A2.start := I_MA1.start + I_ab1.A2 + I_ab2.A2 = (558.16 - 896.561i) A
t_inrush := 0.01 s
I_A2.inrush := I_MA1.inrush + I_ab1.A2 + I_ab2.A2 = (1646.4 - 292.858i) A
# Tavle -A3:
P_lampe := 116 W
n_lampe := 15 stk
P_lys := P_lampe*n_lampe = 1740 W
I_lys := P_lys/U_f = 7.53442 A
I_ab.A3 := 115 A ∠ -acos(0.81)
I_A3.L1 := I_lys + I_ab.A3 = (100.684 - 67.4394i) A
I_A3.L2 := I_ab.A3 = (93.15 - 67.4394i) A
I_A3.L3 := I_ab.A3 = (93.15 - 67.4394i) A
I_A3 := I_A3.L1 = (100.684 - 67.4394i) A
# Tavle -A4:
I_A4 := 120 A ∠ -acos(0.87) = (104.4 - 59.1662i) A
# Tavle -A1:
S_ab.A1 := 200 kVA ∠ acos(0.95)
I_ab.A1 := conj(S_ab.A1)/(sqrt(3)*U_n) = (274.241 - 90.1388i) A
I_A1.L1 := (I_A2 + I_A3.L1 + I_A4 + I_ab.A1)*sf_A1 = (690.881 - 396.618i) A
I_A1.L2 := (I_A2 + I_A3.L2 + I_A4 + I_ab.A1)*sf_A1 = (685.607 - 396.618i) A
I_A1.L3 := (I_A2 + I_A3.L3 + I_A4 + I_ab.A1)*sf_A1 = (685.607 - 396.618i) A
# 2.1 Hovedtavle –A1:
# 2.1.1 Bestem antallet af fasekompensatorbatterier til –A1 for at overholde gældende fællesregulativ.
I_C.min.L1 := Re(I_A1.L1)*(tan(arg(conj(I_A1.L1))) - tan(acos(0.9))) = 62.0088 A
n_batt.min.L1 := (I_C.min.L1*U_n*sqrt(3))/Q_batt = 5.65276 stk  # à  # 6 stk. batterier.
I_C.min.L3 := Re(I_A1.L3)*(tan(arg(conj(I_A1.L3))) - tan(acos(0.9))) = 64.5632 A
n_batt.min.L3 := (I_C.min.L3*U_n*sqrt(3))/Q_batt = 5.88562 stk  # à
# 6 stk. batterier.
n_batt := 6 stk
# ELLER:
# Fase 1:
# Effekt-forbrugt i fabrikken:
P := |U_n*I_A1.L1*cos(arg(conj(I_A1.L1)))*sqrt(3)| = 478.657 kW
# Kondensatorbatteriernes samlede reaktive effekt:
Q_nød := P*(tan(arg(conj(I_A1.L1))) - tan(acos(0.9))) = 42.961 kvar
# Antal nødvendige batterier:
n_batt.nød := Q_nød/Q_batt = 5.65276 stk  # à  # 6 stk. batterier.
# Fase 2 og 3:
# Effekt-forbrugt i fabrikken:
P := |U_n*I_A1.L3*cos(arg(conj(I_A1.L3)))*sqrt(3)| = 475.003 kW
# Kondensatorbatteriernes samlede reaktive effekt:
Q_nød := P*(tan(arg(conj(I_A1.L3))) - tan(acos(0.9))) = 44.7307 kvar
# Antal nødvendige batterier:
n_batt.nød := Q_nød/Q_batt = 5.88562 stk  # à  # 6 stk. batterier.
I_A1 := I_A1.L1 = (690.881 - 396.618i) A
I_A1.dim := (I_A1 + 1j*n_batt*Q_batt/(U_n*sqrt(3))) = (690.881 - 330.8i) A
I_A1.start := I_A1.dim + (4*I_MA1) = (1135.88 - 558.78i) A
I_A1.inrush := I_A1.dim + (9*I_MA1) = (1692.13 - 843.756i) A
# 2.1.2 Valg af maksimalafbryder (MCCB) –Q1 og foretag indstilling til overbelastningsudløseren og vælg korrekt kortslutningsbrydeevne.
# MA vælges ud fra transformerens fuldlaststrøm:
I_2.T = 1443.38 A
I_n := 1600 A
I_2.T ≤ I_n = 1  # OK.
I_CU := 50 kA
I_CS := 37 kA
# Kontrol af kortslutningsbrydeevenen:
I_K3F.max.A1 := U_f/(Z_net + Z_2.T) = (3.36909 - 22.454i) kA
|I_K3F.max.A1| ≤ I_CU = 1
|I_K3F.max.A1| ≤ I_CS = 1  # OK.
# MA:  Compact NS1600N.
# Relæ:
# Mic 2
# I_n = 1600 A
# Ir = (640-1440-1600) A
I_n = 1600 A
I_rx := |I_2.T|/I_n = 0.90211
# à
I_rx := 0.9
I_r := I_n*I_rx = 1440 A  # I_r kunne sættes til 0,92 med high settingplug.
I_r.min := I_n*0.4 = 640 A
# I_sd:
I_inrush := |I_2.T - I_MA1 + I_MA1.inrush| = 2582.75 A
|I_inrush|*1.2 = 3099.31 A
I_r = 1440 A
I_rx := |I_inrush|*1.2/I_r = 2.1523  # à
10  # Da det er den første MA i installationen af hensyn til selektivitet.
# 2-5-10, indstilles højt pga. selektivitet, her vælger jeg 10:
I_sd := I_r*10 = 14400 A
# Da -W1 er så kort og i følge opgaven man skal se bort fra impedansen i denne, så bliver:
I_KFPE.min.A1 := |I_K3F.max.A1| = 22.7054 kA
I_KFPE.min.A1*0.8 = 18.1643 kA
|I_inrush|*1.2 ≤ |I_sd| ≤ I_KFPE.min.A1*0.8 = 1  # FB, BIB i -A1 er OK.
# 2.1.3 Dimensioner forsyningskredsen (hovedkabel) –W1.
I_Z.W1.tabel ≥ I_n/(k_t*k_s)
I_r = 1440 A
I_n = 1600 A
I_2.T = 1443.38 A
# Fremføring på kabelstige, nr. 34-E, tabel B.52.13 kol. 3 (90°C AL-kabel):
k_t := 0.96  # 35°C, tabel B.52.14
k_s := 1  # Alene, tabel B.52.20
I_Z.W1.tabel := I_r/(k_t*k_s) = 1500 A
# à
n_kabel := 5 stk
# Pga. stor belastningsstrøm, trækker jeg 5//kabler:
k_s := 0.8  # 5-strømkredse, 5//,tabel B.52.17
I_Z.W1.tabel := I_r/(k_t*k_s*n_kabel) = 375 A
# Da PE-lederen skal fremføres separat (CU), så omregnes S til CU (tabel 54.2 og 43A):
S_Al := 240 mm^2
k_Al := 94
k_Cu := 143
S_PE.Cu := S_Al/2*k_Al/k_Cu = 78.8811 mm^2  # à
S_PE.Cu := 95 mm^2
# ELLER ifølge Viggo:
S_Al := 240 mm^2
S_PE.Cu := S_Al*30% = 72 mm^2
# à
S_PE.Cu := 95 mm^2
# S = 5//4X240mm^2NOIK-AL-M 90 [409 A] + 5//1G95mm^2NOIKX-FLEX 90
# Da ifølge opgaven kablet er så korte og man ser bort fra impedanserne så bliver:
I_KFPE.min.A1 := I_K3F.max.A1 = (3.36909 - 22.454i) kA
# 2.1.4 Dimensioner den beskyttende potentialudligning (BP) fra hovedjordklemmen til kabelstige.
# 90°C kabel:
# Ifølge afs. 544.1 skal den være mindst:
S_HUF.min := 6 mm^2
k_Al = 94
k_Cu = 143
S_Al = 240 mm^2
S_BPU := k_Al/k_Cu*S_Al/2 = 78.8811 mm^2
# Men ifølge DS/HD60364 pkt. 544.1 behøver denne beskyttende potentialudligning ikke være større end 25mm^2Cu:
S_BPU := 25 mm^2
# NOTE: S-formlen hentes fra tabel 54.2 håndbog og k-værdierne fra 43A.
# 2.2 Kanalskinne -W2 fra -A1 til -A2:
# 2.2.1 Valg af maksimalafbryder (MCCB) –Q2 og foretag indstilling til overbelastningsudløseren og vælg korrekt kortslutningsbrydeevne.
|I_A2| = 616.525 A
I_n := 630 A
|I_A2| ≤ I_n = 1
I_CU := 36 kA
I_CS := 36 kA
# Kontrol af kortslutningsbrydeevnen:
|I_K3F.max.A1| = 22.7054 kA
|I_K3F.max.A1| ≤ I_CU = 1
|I_K3F.max.A1| ≤ I_CS = 1  # OK.
# MA:  Compact NSX630B
# Relæ:
# Mic 2
# I_n = 630 A
# Ir = (250-617,4-630) A
# I_i := 6900 A
I_0 := 630 A
I_rx := |I_A2|/I_0 = 0.978611  # à
I_rx := 0.98
I_r := I_0*I_rx = 617.4 A
# I_sd:
|I_A2.start| = 1.05611 kA
|I_A2.start|*1.2 = 1267.33 A
I_r = 617.4 A
I_rx := |I_A2.start|*1.2/I_r = 2.05269  # à
4
# 3-10, indstilles lavt pga. selektivitet, her vælger jeg 4:
I_sd := I_r*4 = 2469.6 A
I_KFPE.min.A2 := 13.011 kA
|I_KFPE.min.A2|*0.8 = 10.4088 kA
# I_KFPE.min.A2 hentes fra længere ned.
|I_A2.start|*1.2 ≤ I_sd ≤ I_KFPE.min.A2*0.8 = 1  # FB, BIB i -A2 er OK.
# I_i:
|I_A2.inrush| = 1672.24 A
|I_A2.inrush|*1.2 = 2006.69 A
I_i = 6900 A
|I_A2.inrush|*1.2 ≤ I_i = 1  # OK.
# 2.2.2 Dimensioner kanalskinne –W2 ud fra belastningsstrømmen.
I_Z ≥ |I_A2|/k1
|I_A2| = 616.525 A
I_r = 617.4 A
k1 := 1  # k1, 35°C temp. kor. findes i databladet.
I_Z := |I_A2|/k1 = 616.525 A
# Kanalskinnesystem:  Canalis KS 630 [630 A]  3L+N+PE
# 2.2.3 Kontrol om kanalskinne –W2 er kortslutningsbeskyttet samt kan tåle stødstrømmen.
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# KB-kontrol:
I2t_skinne := (1225*10^6) s*A^2
# I2t_relæ aflæses ud fra |I_K3F.max.A1| = 22.7054 kA:
|I_K3F.max.A1| = 22.7054 kA
I2t_relæ := (2.6*10^6) s*A^2
I2t_relæ ≤ I2t_skinne = 1  # Termisk-KB er OK.
# Termisk middelstrøm:
κ := 1.02 + 0.98*e^(-3*cot(acos(0.25))) = 1.47167
f := 50 Hz
t_MA := 0.08 s = 80 ms
# κ kan også hentes fra Viggos lille formelsamling:
κ := 1.48
m := 1/(2*f*t_MA*ln(κ - 1))*(e^(4*f*t_MA*ln(κ - 1)) - 1) = 0.170306
I_th := |I_K3F.max.A1|*sqrt(m + 1) = 24.5628 kA
I2t_th := I_th^2*t_MA = 48266526 s*A^2
I2t_th ≤ I2t_skinne = 1  # Termisk-KB er OK.
n_pk := 2
I_K.pk.T := |I_K3F.max.A1|*n_pk = 45.4107 kA
I_pk.skinne := 67.5 kA
I_K.pk.T ≤ I_pk.skinne = 1  # Dynamisk-KB er OK.  # Kanalskinnen er KB.
# Kan skinnen tåle stødstrømmen?
I_stød := κ*sqrt(2)*|I_K3F.max.A1| = 47.5231 kA
I_stød ≤ I_pk.skinne = 1  # OK.
# Impedanser i kanalskinne og kortslutningsstrømme ved tavle -A2:
l_W2 := 20 m
r_20 := 0.09 mΩ/m
x_1 := 0.07 mΩ/m
r_b1.phPE := 0.41 mΩ/m
x_b.phPE := 0.24 mΩ/m
Z_W2.min := l_W2*(r_20 + 1j*x_1) = (1.8 + 1.4i) mΩ
Z_W2.max := l_W2*(r_b1.phPE + 1j*x_b.phPE) = (8.2 + 4.8i) mΩ
I_K3F.max.A2 := U_f/(Z_net + Z_2.T + Z_W2.min) = (5.37247 - 18.6028i) kA
I_KFPE.min.A2 := U_f/(Z_net + Z_2.T + Z_W2.max) = (7.11721 - 10.8919i) kA
# 2.2.4 Indstil kortslutningsudløseren på –Q2.
|I_A2.start|*1.2 ≤ I_sd ≤ |I_KFPE.min.A2|*0.8 = 1  # FB, BIB i -A2 er OK. (Se også opgave 2.2.1)
# 2.3 Forsyningskreds (hovedkabel) –W3 fra –A1 til –A3:
# 2.3.1 Valg af smeltesikring –F3, samt sikringslastadskiller.
|I_A3| = 121.183 A
I_n.sik := 125 A
|I_A3| ≤ I_n.sik = 1  # OK.
t_start := □ s  # error: Missing term or expression.
I_n.3s := (□*10^3) A  # error: Missing term or expression.
|I_A3.start| =  # error: This variable is undefined. Check that the label is set correctly.
|I_A3.start| ≤ I_n.3s =  # error  # Ikke aktual i denne opgave.
# Smeltesikring:  NH00 gG 125 A.
I_e := 160 A
I_n.sik = 125 A
I_n.sik ≤ I_e = 1  # OK.
# Sikringslastadskiller:  Fupact INFD160 3P+N (N valgfri, pkt. 531.2.2)
# 2.3.2 Dimensioner forsyningskredsen (hovedkabel) –W3.
I_Z.W3.tabel ≥ I_n/(k_t*k_s)
|I_A3| = 121.183 A
I_n.sik = 125 A
# Fremføring på kabelstige, nr. 34-E, tabel B.52.13 kol. 3 (90°C AL-kabel):
k_t := 1  # 30°C, tabel B.52.14
k_s := 0.86  # 2-strømkredse, 2-lage kabelstiger, tabel B.52.20
I_Z.W3.tabel := I_n.sik/(k_t*k_s) = 145.349 A
# Da PE-lederen skal fremføres separat (CU), så omregnes S til CU (tabel 54.2 og 43A):
S_Al := 50 mm^2
k_Al := 94
k_Cu := 143
S_PE.Cu := S_Al/2*k_Al/k_Cu = 16.4336 mm^2  # à
S_PE.Cu := 25 mm^2
# ELLER ifølge Viggo:
S_Al := 50 mm^2
S_PE.Cu := S_Al*30% = 15 mm^2
# à
S_PE.Cu := 25 mm^2
# S = 4X50mm^2NOIK-AL-M 90 [146 A] + 1G25mm^2PVT 90
# 2.3.3 Kontrol om forsyningskredsen (hovedkabel) –W3 er kortslutningsbeskyttet.
# KB kontrolleres ud fra I_KFPE.min.A3:
r_50.Al := 0.641 Ω/km
x_50.Al := 0.08 Ω/km
r_25.Cu := 0.727 Ω/km
x_25.Cu := 0.08 Ω/km
l_W3 := 50 m
Z_W3.min := l_W3*(r_50.Al + 1j*x_50.Al) = (32.05 + 4i) mΩ
Z_W3.max := l_W3*(1.5*r_50.Al + 1j*x_50.Al) = (48.075 + 4i) mΩ
Z_W3.PE.min := l_W3*(r_25.Cu + 1j*x_25.Cu) = (0.03635 + 0.004i) Ω
Z_W3.PE.max := l_W3*(1.25*r_25.Cu + 1j*x_25.Cu) = (0.0454375 + 0.004i) Ω
I_K3F.max.A3 := U_f/(Z_net + Z_2.T + Z_W3.min) = (5.8542 - 2.45243i) kA
I_KFPE.min.A3 := U_f/(Z_net + Z_2.T + Z_W3.max + Z_W3.PE.max) = (2.34567 - 0.445787i) kA
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# I2t_sik ud fra I_KFPE.min.A3:
I2t_smelte := (1*10^5) s*A^2
I2t_1ms := 36000 s*A^2
I2t_a := 70000 s*A^2
I2t_smelte + (I2t_a - I2t_1ms) = 134000 s*A^2
# Hovedkabel kan tåle:
S := 50 mm^2
k := 94*sqrt(s) A/mm^2
(S*k)^2 = 22090000 s*A^2
I2t_smelte + (I2t_a - I2t_1ms) ≤ (S*k)^2 = 1  # KB er OK.
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# PE-leder kan tåle:
S := 25 mm^2
k := 143*sqrt(s) A/mm^2
(S*k)^2 = 12780625 s*A^2
I2t_smelte + (I2t_a - I2t_1ms) ≤ (S*k)^2 = 1  # KB af PE-leder er OK.
# 2.3.4 Kontrol om tavle -A3 er fejlbeskyttet (BIB).
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# FB-kontrol ud fra I_KFPE.min.A3:
t_sik.FPE := (2*10^-2) s = 20 ms
t_FB.411.3.2.3 := 5 s
# Da det er TN-system.
# Ellers skal man vælge fra tabel 41.1.
t_sik.FPE ≤ t_FB.411.3.2.3 = 1  # FB, BIB i -A3 er OK.
# 2.4 Gruppeledning –W5 fra –A3 til belysningsanlægget:
# 2.4.1 Valg af automatsikring (MCB) –Q5.
|I_lys| = 7.53442 A
I_n.sik := 10 A
|I_lys| ≤ I_n.sik = 1  # OK.
|I_K3F.max.A3| = 6.34713 kA
I_CU := 10 kA
|I_K3F.max.A3| ≤ I_CU = 1  # OK.
I_inrush := |I_lys| = 7.53442 A
I_m.min := 5*I_n.sik = 50 A
I_inrush ≤ I_m.min = 1  # OK.
I_m.max := 10*I_n.sik = 100 A
# FB, BIB er OK i lys, men ikke nødvendig, hvis der er krav om RCD. I_KFPE.min.lys Hentes fra længere ned.
I_KFPE.min.lys := 191.365 A
I_m.max ≤ I_KFPE.min.lys = 1  # à
# Automatsikring:  iC60N 10 A, C-kar. 1P+N.
# Da BEK 1082/2016 § 35 foreskriver, at alle tilslutningsteder op til 32 A skal beskyttes af RCD på max. 30 mA vælger jeg at installere en RCD, type A, 30 mA, 2P, 40 A.
# Fejlbeskyttelse BIB-RCD:
I_e := 25 A
|I_lys| = 7.53442 A
|I_lys| ≤ I_e = 1  # OK.
I_CN := 20 kA
|I_K3F.max.A3| = 6.34713 kA
|I_K3F.max.A3| ≤ I_CN = 1  # OK, men ikke nødvendig, da 10 A AS. bryder (back-up).
# RCD:  Sncheider ID 25 / 0,03 / 2P klasse A.
# (t = momentan. Krav ifølge bek.1082, idet I_n ≤ 32*A)
# 2.4.2 Dimensioner kabel –W5 ud fra kravet til spændingsfald.
I_Z.W5.tabel ≥ I_n/(k_t*k_s)
I_lys = 7.53442 A
I_n.sik = 10 A
# Fremføring på kabelstige, nr. 34-E, tabel B.52.12 kol. 2 (90°C CU-kabel):
k_t := 1.04  # 25°C, tabel B.52.14
k_s := 0.8  # 5-strømkredse, tabel B.52.20
I_Z.W5.tabel := I_n.sik/(k_t*k_s) = 12.0192 A
# Fremføring direkte under loft, nr. 21-C, tabel B.52.3 kol. 6 (90°C CU-kabel):
k_t := 1.04  # 25°C, tabel B.52.14
k_s := 0.95  # Alene, tabel B.52.17
I_Z.W5.tabel := I_n.sik/(k_t*k_s) = 10.1215 A
# S = 3G1,5mm^2NOSKLX medico 90 [24 A]
# I følge Anneks G tabel G.52.1 pkt. B, gælder:
ΔU_f.ændring.max := 6%
b_3F := 1
b_FN := 2  # Ikke aktuel i denne opgave.
# Kontroller om spændingsfald:
r_1.5.Cu := 12.1 Ω/km
x_1.5.Cu := 0.08 Ω/km
l_W5 := 50 m
ΔU_f.W5 := Re(I_lys*l_W5*(1.25*r_1.5.Cu + x_1.5.Cu)) = 5.72804 V
ΔU_f.ændring := ΔU_f.W5/U_f = 0.0248032  # Hvilket er større end 2%, som opgaven tillader, så IKKE OK.
# NOTE: Når virksomheden selv står for drift og vedligehold anses det som en privat lavspændingsforsyning.
# Valg af større kabel:
r_2.5.Cu := 7.41 Ω/km
x_2.5.Cu := 0.08 Ω/km
l_W5 = 50 m
ΔU_f.W5 := Re(I_lys*l_W5*(1.25*r_2.5.Cu + x_2.5.Cu)) = 3.51952 V
ΔU_f.ændring := ΔU_f.W5/U_f = 0.01524  # Hvilket er mindre end 2%, som opgaven tillader, så OK.
# S = 3G2,5mm^2NOSKLX medico 90 [26 A]
Z_W5.min := l_W5*(r_2.5.Cu + 1j*x_2.5.Cu) = (370.5 + 4i) mΩ
Z_W5.max := l_W5*(1.5*r_2.5.Cu + 1j*x_2.5.Cu) = (555.75 + 4i) mΩ
I_K3F.max.lys := U_f/(Z_net + Z_2.T + Z_W3.min + Z_W5.min) = (570.411 - 25.4933i) A
I_KFPE.min.A3 := U_f/(Z_net + Z_2.T + Z_W3.max + Z_W3.PE.max + 2*Z_W5.max) = (191.321 - 4.13216i) A
