kWh := kW*hr
kmol := 1000 mol
B_HFO := 3.4
kJ := 1000 J
MWh := kWh*10^3
α := 0.00075 K^-1
R_m := 8.314472 J/(mol*K)
var := W
MJ := 10^6 J
dm := 0.1 m
VA := W
kg_oil := kg
degC := °C
g := 9.817 m/s^2
kVA := kV*A
kg_air := kg
μWb := 10^-6 Wb
∡(x) := arg(x)
m_air := m^3
mWb := 10^-3 Wb
ρ_vand := 980 kg/m^3
mΩ := 10^-3 Ω
m_oil := m^3
μN := 10^-6 N
µF := 10^-6 F
pct := 0.01
kr := 1
stk := 1
ρ_luft := 1.2 kg/m^3
kvar := 10^3 var
rpm := min^-1
HK := 0.736 kW
µε := 10^-6
mH2O := 9806.383 Pa
μS := 10^-6 S
mT := 10^-3 T
mmH2O := 10^-3 mH2O
rps := s^-1
cSt := mm^2/s
mN := 10^-3 N
mmHg := 133.322 Pa
mF := 10^-3 F
MVA := 10^6 VA
sømil := knot*hr
Nm := N*m
C_p.vand := 4.2 kJ/(kg*K)
Mvar := 10^6 var
μT := 10^-6 T
kNm := kN*m
mbar := 10^-3 bar
pers := 1
øre := 0.01 kr
C_p.luft := 1.01 kJ/(kg*K)
kg_damp := kg
kg_luft := kg
kg_fugt := kg
gm_damp := gm
gm_fugt := gm
C_p.damp := 1.8 kJ/(kg*K)
r_0 := 2500 kJ/kg
# OPGAVE 1.
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S_KN.max := 50 MVA
φ_KN.max := acot(0.58)
S_KN.min := 35 MVA
φ_KN.min := acot(0.9)
U_n := 10 kV
I'_linje := 400 A
t'_linje := 1 s
U_1N := 10.5 kV
U_2N := 0.42 kV
U_f := U_2N/sqrt(3) = 242.487 V
S_T := 500 kVA
e_k.T := 5%
e_r.T := 1%
I_J := 30 A  # à
# Generelle beregninger: | TN-system.
Z_net.min := (U_n^2/S_KN.max) ∠ φ_KN.max = (1.00344 + 1.73006i) Ω
P_Cu.T := e_r.T*S_T = 5000 W
Z_net.max := (U_n^2/S_KN.min) ∠ φ_KN.min = (1.91133 + 2.1237i) Ω
φ_T := acos(e_r.T/e_k.T) = 78.463 deg
Z_1.T := (U_1N^2*e_k.T/S_T) ∠ acos(P_Cu.T/(S_T*e_k.T)) = (2.205 + 10.8022i) Ω
I_1.T := S_T/(U_1N*sqrt(3)) = 27.4929 A
n := U_1N/U_2N = 25
I_2.T := I_1.T*n = 687.322 A  # ELLER:
I_2.T := S_T/(U_2N*sqrt(3)) = 687.322 A
I_T.inrush := 15*I_1.T = 412.393 A
# 1.1 Vælg strømtransformer (CT) efter fuldlaststrøm og foretag indstlling af relæ til beskyttelse af
# -T1.
# Der regnes med, at transformeren skal kunne belastes med 120%:
# Valg af relæ:  ABB REF615
# Valg af relæets mærkestrøm:  I_n.relæ := 5 A
# k_i:
I_1.ki ≥ 120%*I_1.T1
120%*I_1.T = 32.9914 A
I_1.ki := 50 A
# à
k_i := 50/5
I'_relæ := 120%*I_1.T/(k_i*I_n.relæ) = 0.659829
# à
I'_relæ := 0.7
I'_T1 := I'_relæ*k_i*I_n.relæ = 35 A
# For at være sikker på selektivitet imellem linje- og transformerrelæet, ønskes der en Δt på mindst 0,2s:
# Δt := 0.2 s
t'_linje = 1 s
t'_T := t'_linje - Δt = 0.8 s
# à
t'_T := 0.8 s
U_n = 10 kV
# Da ifølge opgaven skal man se bort fra de interne kabel-impedanser, så regnes de ikke med i I_K beregninger:
I_K3F.max.T.HV := U_n/(Z_net.min*sqrt(3)) = (1.44834 - 2.49713i) kA
I_K3F.min.T.HV := U_n/(Z_net.max*sqrt(3)) = (1.35179 - 1.50199i) kA
I_K2F.max.T.HV := I_K3F.max.T.HV*sqrt(3)/2 = (1.2543 - 2.16258i) kA
I_K2F.min.T.HV := I_K3F.min.T.HV*sqrt(3)/2 = (1.17069 - 1.30076i) kA
I'_K3F.max.T.LV := U_n/((Z_net.min + Z_1.T)*sqrt(3)) explicit, ALL → 10*kV/(((1.00343617954 + 1.73006237852i)*Ω + (2.205 + 10.8022497657i)*Ω)*sqrt(3)) = (110.688 - 432.352i) A
I''_relæ := |I'_K3F.max.T.LV|/(k_i*I_n.relæ) = 8.92591  # à
I''_relæ := 15
I''_T := I''_relæ*k_i*I_n.relæ = 750 A
I_K2F.min.T.HV*0.75 = (0.878016 - 0.975574i) kA
I''_T = 750 A
I_T.inrush = 412.393 A
|I_K2F.min.T.HV|*0.75 ≥ I''_T ≥ I_T.inrush and |I'_K3F.max.T.LV| = 1  # OK.
t''_T := 0.04 s  # Pga. personsikkerhed så mindst som muligt.
# 1.2 Dimensioner de interne højspændingsledere (HVFL).
# I følge opgaven skal de dimensioneres efter transformerens fuldlaststrøm:
I_Z.luft.HV ≥ I_1.T1/k_t
I_1.T = 27.4929 A
# Fremføring af én-leder på kabelstige i luft (90°C CU-kabel):
# NOTE: Der regnes med placering i trekant, så er man på den sikre side.
k_t := 0.9  # 35°C, NKT, tabel 63
# HVFL hentes fra Viggos lille formesamling:
I_Z.luft.HV := I_1.T/k_t = 30.5476 A
# S = 3-stk. 1X16+5mm^2PEX-CU i trekant  [120 A]
# KB-kontrol:
t_e := 0.1 s  # t_e er ikke oplyst, men vi sætter den til 0,1 s.
I_K1s.fase := 2.3 kA*sqrt(s)
I_K1s.skærm := 1 kA*sqrt(s)
t''_T = 0.04 s
t_e = 0.1 s
|I_K3F.max.T.HV|*sqrt(t''_T + t_e) = 1.08012 s^(1/2)*kA
|I_K3F.max.T.HV|*sqrt(t''_T + t_e) ≤ I_K1s.fase = 1  # OK.
|I_K2F.max.T.HV|*sqrt(t''_T + t_e) = 0.935414 s^(1/2)*kA
|I_K2F.max.T.HV|*sqrt(t''_T + t_e) ≤ I_K1s.skærm = 1  # OK.
# NOTE: Da en dobbelt skærm slutning anses for usandsynlig i transformerstationen, så kan der også ses bort fra den.
# Kablet er kortslutningsbeskyttet.
# 1.3 Vælg sikringlastadskiller til tavle -A0 samt de tilhørende lavspændingssikringer.
# Opgaven angiver, at kablerne skal dimensioneres til transformerens fuldlaststrøm. Skal smeltesikringer i indgangen til tavle -A0 vælges større eller mindre end transformerens fuldlaststrøm? Hvis den skal vælges større, skal der anvendes NH4 gG smeltesikringer. Schneider fremstiller ikke sikringlastadskiller til NH4-smeltesikringer. Kan der opsættes to parallelle, der mekanisk er bygget sammen?
# ABB kan levere en 800 A NH3 smeltesikring, de studerende har ikke adgang ti disse oplysninger.
I_K3F.max.T.LV := I'_K3F.max.T.LV*n explicit, ALL → (110.687736923 - 432.351834983i)*A*25 = (2.76719 - 10.8088i) kA
I'_K3F.min.T.LV := U_n/((Z_net.max + Z_1.T)*sqrt(3)) = (129.144 - 405.533i) A
I_K3F.min.T.LV := I'_K3F.min.T.LV*n = (3.2286 - 10.1383i) kA
I_2.T = 687.322 A
I_n.sik := 630 A
I_2.T ≤ I_n.sik = 0  # IKKE OK.
# Smeltesikring:  NH3 gG 630 A.
I_CW.1s := 18 kA
I_cn := 100 kA
I_cm := 220 kA
n_pk := 2  # Fra Viggos LFS.
|I_K3F.max.T.LV| = 11.1574 kA
|I_K3F.max.T.LV| ≤ I_cn = 1  # OK.
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I_pk := |I_K3F.max.T.LV|*n_pk = 22.3148 kA
I_pk ≤ I_cm = 1  # OK.
# I2t_sik ud fra I_K3F.min.T.LV:
|I_K3F.min.T.LV| = 10.64 kA
I2t_afb := I_CW.1s^2*1 s = 324000000 s*A^2
I2t_sik := (2*10^7) s*A^2
I2t_sik ≤ I2t_afb = 1  # OK.
# Sikringslastadskiller:  Fupact INFD800 3P+N.
# (N valgfri hvis TN-S, ellers 3P, pkt. 531.2.2)
# 1.4 Dimensioner de interne lavspændingsledere (LVFL).
I_Z.luft.LV ≥ I_2.T/(k_t*k_s)
I_n.sik = 630 A
I_2.T = 687.322 A
# Fremføring af én-leder på kabelstige, nr. 34-F, kol. 6, tabel B.52.12 (90°C CU-kabel):
k_t := 0.96  # 35°C, tabel B.52.14
k_s := 1  # Alene, tabel B.52.21
I_Z.luft.LV := I_n.sik/(k_t*k_s) = 656.25 A
# S = 4-stk. 1X300mm^2NOIKX-FLEX 90 [736 A] (Kortslutningssikkert oplagt, 4 kabler ialt)
# Alternativt, 2//kredse:
n_kabel := 2 stk
k_t = 0.96  # 35°C, tabel B.52.14
k_s := 0.97  # 2-strømkredse, tabel B.52.21
I_Z.luft.LV := I_n.sik/(k_t*k_s*n_kabel) = 338.273 A
# S = 4-stk. 2//1X95mm^2PVT 90 [342 A] (Kortslutnignssikkert oplagt, 8 stk. kabler ialt)
# KB-kontrol:
# I2t_kabel ud fra I_K3F.max.T.LV:
|I_K3F.max.T.LV| = 11.1574 kA
t_e = 0.1 s
t'_T = 0.8 s
I2t_kabel := |I_K3F.max.T.LV^2|*(t'_T + t_e) = 112038685 s*A^2
S := 300 mm^2
k := 143*A*sqrt(s)/mm^2
(S*k)^2 = 1.84041e9 s*A^2
I2t_kabel ≤ (S*k)^2 = 1  # KB er OK.
# 1.5 Dimensioner beskyttelses-, drifts- og fællesjord herunder også jordelektrodens overgangsmodstand til neutral jord.
|I_K2F.max.T.HV| = 2.5 kA
I_KFN.max.T.LV := |I_K3F.max.T.LV| = 11.1574 kA
k := 226*A*sqrt(s)/mm^2
Θ_f := 300
Θ_i := 35
β := 234.5
t_e = 0.1 s
t'_linje = 1 s
t'_T = 0.8 s
S_BJ := |I_K2F.max.T.HV|/k*sqrt((t'_linje + t_e)/ln((Θ_f + β)/(Θ_i + β))) = 14.0203 mm^2  # à
S_BJ := 16 mm^2
# Min. 16 mm^2i følge DS/EN 50255 pkt. 5.2.2
S_DJ := I_KFN.max.T.LV/k*sqrt((t'_T + t_e)/ln((Θ_f + β)/(Θ_i + β))) = 56.5986 mm^2  # à
S_DJ := 70 mm^2
S_jordskinne ≥ S_BJ and S_DJ == 56.599 mm^2
# à
S_jordskinne := 20 mm^2*5 = 100 mm^2
# Da TN-system:
U_TP := 80 V
I_J = 30 A
R_E.T := U_TP/I_J = 2.66667 Ω
# 1.6 Tegn kredsskema (enstreg) over transformerstationen -T1, inkl.sløjfelt, målesketion, lavspændingstavele -A0 samt jordingsalægget.
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# OPGAVE 2.
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# à
# TN-S-system.
U_n := 400 V
S_T := 500 kVA
U_1N := 10 kV
U_2N := 0.4 kV
U_f := 230 V
n := U_1N/U_2N = 25
I_K3F.max.A0.0 := 20 kA ∠ -acos(0.3)
I_KFN.min.A0.0 := 17 kA ∠ -acos(0.4)
# Generelle beregninger:
Z_net.min := U_f/I_K3F.max.A0.0 = (3.45 + 10.9703i) mΩ
I_1.T := S_T/(U_1N*sqrt(3)) = 28.8675 A
Z_net.max := U_f/I_KFN.min.A0.0 = (5.41176 + 12.3999i) mΩ
I_2.T := S_T/(U_2N*sqrt(3)) = 721.688 A
# Belastninger under tavle -A1.0:
# Tavle -A1.1:
S_A1.1 := 160 kVA ∠ acos(0.8)
I_A1.1 := conj(S_A1.1)/(U_n*sqrt(3)) = (184.752 - 138.564i) A
# Tavle -A1.2:
# To-fasede belastninger i grupper af tre:
I_vb := sqrt(3)*(9.24 A ∠ -acos(0.866)) = (13.8596 - 8.00278i) A  # NOTE: Ganges med sqrt(3) fordi belastningen er 1x400 V.
I_ve := sqrt(3)*15 A = 25.9808 A
# En-fasede belastninger i grupper af tre:
I_lys := 10 A ∠ -acos(0.866)
I_stik := 13 A
I_edb1 := 6 A ∠ -acos(0.866)
I_edb2 := 8 A
I_edb3 := 8 A
I_testA := 6 A ∠ -acos(0.866)
I_testB := 8 A
I_testC := 6 A ∠ -acos(0.866)
# Tre-fasede belastninger:
I_MA1.2.1 := 42 A ∠ -acos(0.8)
I_MA1.2.1.start := 5*I_MA1.2.1 = (168 - 126i) A
I_MA1.2.1.inrush := 2*I_MA1.2.1.start = (336 - 252i) A
t_start := 3 s
I_ab.A1.2 := 80 A ∠ -acos(0.9) = (72 - 34.8712i) A
I_CEE := 16 A
S_ab.A1.0 := 165 kVA ∠ acos(0.9)
I_ab.A1.0 := conj(S_ab.A1.0)/(U_n*sqrt(3)) = (214.341 - 103.81i) A
I_A1.2.L1 := I_vb + I_ve + I_lys + I_stik + I_edb1 + I_testA + I_MA1.2.1 + I_CEE + I_ab.A1.2 = (193.492 - 79.0749i) A
I_A1.2.L2 := I_vb + I_ve + I_lys + I_stik + I_edb2 + I_testB + I_MA1.2.1 + I_CEE + I_ab.A1.2 = (199.1 - 73.0744i) A
I_A1.2.L3 := I_vb + I_ve + I_lys + I_stik + I_edb3 + I_testC + I_MA1.2.1 + I_CEE + I_ab.A1.2 = (196.296 - 76.0747i) A
I_A1.2 := I_A1.2.L2 = (199.1 - 73.0744i) A
I_A1.2.start := I_A1.2 - I_MA1.2.1 + I_MA1.2.1.start = (333.5 - 173.874i) A
I_A1.2.inrush := I_A1.2 - I_MA1.2.1 + I_MA1.2.1.inrush = (501.5 - 299.874i) A
# Tavle -A1.0:
I_A1.0 := I_A1.1 + I_A1.2 + I_ab.A1.0 = (598.194 - 315.449i) A
I_A1.0.start := I_A1.1 + I_A1.2.start + I_ab.A1.0 = (732.594 - 416.249i) A
I_A1.0.inrush := I_A1.1 + I_A1.2.inrush + I_ab.A1.0 = (900.594 - 542.249i) A
# Er FR overholdt med hensyn til fasekompensering?
cos(arg(conj(I_A1.0))) = 0.884546
0.9 < 0.885 = 0  # IKKE OK, så skal der fasekompenseres.
# 2.1 Kanalskinne fra transformer -T2 til tavle -A1.0:
# 2.1.1. Vælg en egnet kanalskinne af de på bilag 2.2 angivne.
I_Z ≥ I_2.T/k1
k1 := 1  # 35°C, findes i databladet.
I_Z := I_2.T/k1 = 721.688 A
# Kanalskinnesystem:  Canalis KS 800 [800 A]  3L+N+PE
# 2.1.2. Vælg maksimalafbryder og foretag de nødvendige indstillinger.
# MA vælges ud fra transformerens fuldlaststrøm:
I_2.T = 721.688 A
I_n := 800 A
I_2.T ≤ I_n = 1
I_CU := 50 kA
I_CS := 37 kA
# Kontrol af kortslutningsbrydeevenen:
|I_K3F.max.A0.0| = 20 kA
|I_K3F.max.A0.0| ≤ I_CU = 1
|I_K3F.max.A0.0| ≤ I_CS = 1  # OK.
# MA:  Compact NS800N.
# Relæ:
# Mic 2
# I_n = 800 A
# Ir = (320-720-800) A
I_0 := I_n = 800 A
I_rx := I_2.T/I_0 = 0.90211
# à
I_rx := 0.9
I_r := I_n*I_rx = 720 A  # Eller evt. 0,95  _(= 760 A)
I_r.min := 0.4*I_n = 320 A
# I_sd:
|I_A1.0.inrush| = 1051.24 A
|I_A1.0.inrush|*1.2 = 1261.49 A
# Da det er den første MA i installationen af hensyn til selektivitet.
I_r = 720 A
I_rx := |I_A1.0.inrush|*1.2/I_r = 1.75206  # à
10
# 2-5-10, indstilles højt pga. selektivitet, her vælger jeg 10:
I_sd := I_r*10 = 7200 A
I_KFPE.min.A1.0 := 11.829 kA
I_KFPE.min.A1.0*0.8 = 9463.2 A
# I_KFPE.min.A1.0 hentes fra længere ned.
|I_A1.0.inrush|*1.2 ≤ |I_sd| ≤ I_KFPE.min.A1.0*0.8 = 1  # FB, BIB i -A1.0 er OK.
# 2.1.3. Undersøg om den valgte kanalskinne er kortslutningsbeskyttet.
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I2t_skinne := (1758*10^6) s*A^2
# I2t_relæ aflæses ud fra |I_K3F.max.A0.0| = 20 kA:
I2t_relæ := (1.4*10^7) s*A^2
I2t_relæ ≤ I2t_skinne = 1  # Termisk-KB er OK.
# Termisk middelstrøm: (κ fra Viggos LFS)
κ := 1.02 + 0.98*e^(-3*cot(acos(0.3))) = 1.40149
κ := 1.41
f := 50 Hz
t_MA := 0.08 s = 80 ms
m := 1/(2*f*t_MA*ln(κ - 1))*(e^(4*f*t_MA*ln(κ - 1)) - 1) = 0.140198
I_th := |I_K3F.max.A0.0|*sqrt(m + 1) = 21.356 kA
I2t_th := I_th^2*t_MA = 36486323 s*A^2
I2t_th ≤ I2t_skinne = 1  # Termisk-KB er OK.
n_pk := 2
I_K.pk.T := |I_K3F.max.A0.0|*n_pk = 40 kA
I_pk.skinne := 78.7 kA
I_K.pk.T ≤ I_pk.skinne = 1  # Dynamisk-KB er OK.  # Kanalskinnen er KB.
# Kan skinnen tåle stødstrømmen?
I_stød := κ*sqrt(2)*|I_K3F.max.A0.0| = 39.8808 kA
I_stød ≤ I_pk.skinne = 1  # OK.
# Impedanser i kanalskinne og kortslutningsstrømme ved tavle -A1.0:
l_W0.0 := 15 m
r_20 := 0.06 mΩ/m
x_1 := 0.06 mΩ/m
r_b1.phPE := 0.39 mΩ/m
x_b.phPE := 0.23 mΩ/m
Z_W0.0.min := l_W0.0*(r_20 + 1j*x_1) = (0.9 + 0.9i) mΩ
Z_W0.0.max := l_W0.0*(r_b1.phPE + 1j*x_b.phPE) = (5.85 + 3.45i) mΩ
I_K3F.max.A1.0 := U_f/(Z_net.min + Z_W0.0.min) = (6.25991 - 17.0821i) kA
I_KFPE.min.A1.0 := U_f/(Z_net.max + Z_W0.0.max) = (6.85154 - 9.64293i) kA
# 2.2 Hovedledning til tavle -A1.1:
# 2.2.1. Vælg sikring og sikringslastadskiller.
|I_A1.1| = 230.94 A
I_n.sik := 250 A
|I_A1.1| ≤ I_n.sik = 1  # OK.
I_A1.1start =  # error: This variable is undefined. Check that the label is set correctly.
I_n.5s := (□*10^3) A  # error: Missing term or expression.
|I_A4.start| ≤ I_n.5s =  # error  # Ikke aktuel i denne opgave:
# NOTE: 5 s, fordi startstrømmen er på Imax. 5 s start på tiden og kør ud til kurven og derefer ned.
# Smeltestikring:  NH1 gG 250 A.
I_e := 250 A
I_n.sik = 250 A
I_n.sik ≤ I_e = 1  # OK.
I_CW.1s := 8 kA
I_cn := 100 kA
I_cm := 220 kA
n_pk = 2
|I_K3F.max.A1.0| = 18.193 kA
|I_K3F.max.A1.0| ≤ I_cn = 1  # OK.
I_pk := |I_K3F.max.A1.0|*n_pk = 36.3859 kA
I_pk ≤ I_cm = 1  # OK.
# I2t_sik ud fra I_KFPE.min.A1.1:
I_KFPE.min.A1.1 := 7.721 kA  # Hentes fra længere ned.
I2t_afb := I_CW.1s^2*1 s = 64000000 s*A^2
I2t_sik := (465*10^3) s*A^2  # I2t_sik Hentes fra længere ned.
I2t_sik ≤ I2t_afb = 1  # OK.
# Sikringslastadskiller:  Fupact INFD250 3P+N (N valgfri, pkt. 531.2.2)
# 2.2.2. Dimensioner kablet -W1.
I_Z.W1.tabel ≥ I_A1.1/(k_t*k_s)
|I_A1.1| = 230.94 A
I_n.sik = 250 A
# Fremføring på kabelstige, nr. 34-E, tabel B.52.12, kol. 3 (90°C CU-kabel):
k_t := 1.04  # 25°C, tabel B.52.14
k_s := 0.87  # 2-strømkredse, tabel B.52.20
I_Z.W1.tabel := I_n.sik/(k_t*k_s) = 276.304 A
# S = 4X95mm^2NOBH + 1G95mm^2NOIKX-FLEX 90 [304 A]
# 2.2.3. Kontroller om kablet -W1 er kortslutningsbeskyttet.
# KB kontrolleres ud fra I_KFPE.min.A1.1:
r_95.Cu := 0.194 Ω/km
x_95.Cu := 0.08 Ω/km
l_W1 := 20 m
Z_W1.min := l_W1*(r_95.Cu + 1j*x_95.Cu) = (3.88 + 1.6i) mΩ
Z_W1.max := l_W1*(1.5*r_95.Cu + 1j*x_95.Cu) = (5.82 + 1.6i) mΩ
I_K3F.max.A1.1 := U_f/(Z_net.min + Z_W0.0.min + Z_W1.min) = (7.59646 - 12.4334i) kA
I_KFPE.min.A1.1 := U_f/(Z_net.max + Z_W0.0.max + 2*Z_W1.max) = (5.93584 - 4.93749i) kA
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# I2t_sik ud fra I_KFPE.min.A1.1:
I2t_smelte := (2.5*10^5) s*A^2
I2t_1ms := 205000 s*A^2
I2t_a := 420000 s*A^2
I2t_smelte + (I2t_a - I2t_1ms) = 465000 s*A^2
# Kablet kan tåle:
S := 95 mm^2
k := 143*sqrt(s) A/mm^2
(S*k)^2 = 184552225 s*A^2
I2t_smelte + (I2t_a - I2t_1ms) = 465000 s*A^2
I2t_smelte + (I2t_a - I2t_1ms) ≤ (S*k)^2 = 1  # KB er OK.
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# 4. Er tavle -A1.1 fejlbeskyttet (BIB'et)?
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# FB kontrolleres ud fra I_KFPE.min.A1.1:
|I_KFPE.min.A1.1| = 7.72095 kA
t_sik.FPE := (4*10^-3) s = 4 ms
t_FB.411.3.2.3 := 5 s
t_sik.FPE ≤ t_FB.411.3.2.3 = 1  # FB, BIB er OK.
# I følge DS/HD60364 pkt. 411.3.2.3, må udkoblingstiden være 5 s i TN-system, og da smeltesikringen smelter på 4 ms ved |I_KFPE.min.A1.1| = 7.72095 kA, så er FB, dermed BIB OK.
# 2.3 Hovedledning -W2 til tavle -A1.2:
# 1. Vælg og indstill maksimalafbryderens overbelastningsudløser til kablet -W2.
|I_A1.2| = 212.087 A
I_n := 250 A
|I_A1.2| ≤ I_n = 1
I_CU := 25 kA
I_CS := 25 kA
# Kontrol af kortslutningsbrydeevenen:
|I_K3F.max.A1.0| = 18.193 kA
|I_K3F.max.A1.0| ≤ I_CU = 1
|I_K3F.max.A1.0| ≤ I_CS = 1  # OK.
# MA:  Compact NSX250B
# Relæ:
# Mic 2
# In _(= 250) A
# Ir = (100-213,75-250) A
# I_i := 3000 A
I_0 := 225 A
I_rx := |I_A1.2|/I_0 = 0.942608
# à
I_rx := 0.95
I_r := I_0*I_rx = 213.75 A
# I_sd:
|I_A1.2.start| = 376.105 A
|I_A1.2.start|*1.2 = 451.326 A
I_r = 213.75 A
I_rx := |I_A1.2.start|*1.2/I_r = 2.11147  # à
3
# 3-5-10, indstilles lavt pga. selektivitet, her vælger jeg 3:
I_sd := I_r*3 = 641.25 A
I_KFPE.min.A1.2 := 5.94 kA
I_KFPE.min.A1.2*0.8 = 4.752 kA
# I_KFPE.min.A1.2 hentes fra længere ned.
|I_A1.2.start|*1.2 ≤ |I_sd| ≤ I_KFPE.min.A1.2*0.8 = 1  # FB, BIB i -A1.2 er OK.
# I_i:
|I_A1.2.inrush| = 584.318 A
|I_A1.2.inrush|*1.2 = 701.181 A
I_i = 3000 A
|I_A1.2.inrush|*1.2 ≤ I_i = 1  # OK.
# 2. Dimensioner kablet -W2.
I_Z.W2.tabel ≥ I_A1.2/(k_t*k_s)
|I_A1.2| = 212.087 A
I_r = 213.75 A
# Fremføring på kabelstige, nr. 34-E, tabel B.52.12, kol. 3 (90°C CU-kabel):
k_t := 1.04  # 25°C, tabel B.52.14
k_s := 0.87
# 2-strømkredse, tabel B.52.20
I_Z.W2.tabel := I_r/(k_t*k_s) = 236.24 A
# Kabel alene på kabelstige i rum 2:
k_t := 0.96  # 35°C, tabel B.52.14
k_s := 1  # Alene, tabel B.52.20
I_Z.W2.tabel := I_r/(k_t*k_s) = 222.656 A
# S = 4X70mm^2NOIKX-FLEX 90 + 1G70mm^2NOIKX-FLEX 90 [246 A]
# 3. Indstil maksimalafbryderens kortslutningsudløser.
r_70.Cu := 0.269 Ω/km
x_70.Cu := 0.08 Ω/km
l_W2 := 27 m
Z_W2.min := l_W2*(r_70.Cu + 1j*x_70.Cu) = (7.263 + 2.16i) mΩ
Z_W2.max := l_W2*(1.5*r_70.Cu + 1j*x_70.Cu) = (10.8945 + 2.16i) mΩ
I_K3F.max.A1.2 := U_f/(Z_net.min + Z_W0.0.min + Z_W2.min) = (8.05216 - 9.72825i) kA
I_KFPE.min.A1.2 := U_f/(Z_net.max + Z_W0.0.max + 2*Z_W2.max) = (5.07056 - 3.09441i) kA
|I_A1.2.start|*1.2 ≤ |I_sd| ≤ |I_KFPE.min.A1.2|*0.8 = 1  # FB, BIB i -A1.2 er OK. (Se også opgave 1)
# 4. Kontroller om kablet -W2 er kortslutningsbeskyttet.
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# KB kontrolleres ud fra I_K3F.max.A1.0:
|I_K3F.max.A1.0| = 18.193 kA
# Kablet kan tåle:
S := 70 mm^2
k := 143*sqrt(s) A/mm^2
(S*k)^2 = 100200100 s*A^2
I2t_smelte := (7*10^5) s*A^2
I2t_smelte ≤ (S*k)^2 = 1  # KB er OK.
# 5. Undersøg om spændigsfaldet i kabel -W2 er overholdt.
ΔU_f.W2 := Re(I_A1.2*l_W2*(1.25*r_70.Cu + 1j*x_70.Cu)) = 1.96542 V
|I_A1.2| = 212.087 A
ΔU_f.W2.ændring := ΔU_f.W2/U_f = 0.00854532  # Hvilket er mindre end 1%, som opgave tillader, så er det OK.
# 2.4 Dimensionering gruppeledning til -MA1.2.1:
# 1. Vælg det håndbetjent-motorværn til maskinen -MA1.2.1.
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|I_MA1.2.1| = 42 A
I_n := 63 A
|I_MA1.2.1| ≤ I_n = 1
# HM:  GV3 ME63
# Ir = (40-42-63)
# I_CU := 35 kA
# I_d := 13*I_n = 819 A
# (Da startstrømmen kun er angivet til 5 gange I_MA1.2.1 , så vil denne ikke blive påvirket)
# Kontrol af kortslutningsbrydeevnen:
|I_K3F.max.A1.2| = 12.6284 kA
I_CU = 35 kA
|I_K3F.max.A1.2| ≤ I_CU = 1  # OK.
I_n.3s := 10*|I_MA1.2.1| = 420 A
|I_MA1.2.1.start| = 210 A
|I_MA1.2.1.start| ≤ I_n.3s = 1  # OK.
# I_d:
# NOTE: I de HM'er, som man ikke kender I_d, så beregnes på den måde:
# 0,8 er en ekstra sikkerhedsfaktor og kan også fjernes.
# 1,2 er en ekstra sikkerhedsfaktor og kan også fjernes.
I_r.max := I_n = 63 A
I_d := 13*I_r.max = 819 A
|I_MA1.2.1.inrush|*1.2 = 504 A
I_d*1.2 = 982.8 A
# FB, BIB i -MA1.2.1 er OK, men ikke nødvendig, hvis der BIB'es med HPFI (RCD). I_KFPE.min.MA1.2.1 hentes fra længere ned.
|I_MA1.2.1.inrush|*1.2 ≤ I_d*0.8 = 1  # OK.
I_KFPE.min.MA1.2.1 := 1.209 kA
I_d ≤ |I_KFPE.min.MA1.2.1|*0.8 = 1  # à
# 2. Dimensioner kablet -W3 til maskinen -MA1.2.1.
I_Z.W3.tabel ≥ I_n/(k_t*k_s)
|I_MA1.2.1| = 42 A
# Fremføring på kabelstige nr. 34-E, tabel B.52.12, kol. 3 (90°C CU-kabel):
k_t := 0.96  # 35°C, tabel B.52.14
k_s := 0.87  # 2-strømkredse, tabel B.52.20
I_Z.W3.tabel := |I_MA1.2.1|/(k_t*k_s) = 50.2874 A
# Fremføring på væg, nr. 20-C, tabel B.52.5, kol. 6 (90°C CU-kabel):
k_t := 0.96  # 35°C, tabel B.52.14
k_s := 1  # Alene, tabel B.52.17
I_Z.W3.tabel := |I_MA1.2.1|/(k_t*k_s) = 43.75 A
# S = 5G6mm^2NOBH  [54 A]
# Dimensionering af tilledningen (TL):
|I_MA1.2.1| = 42 A
k_t := 0.96  # 35°C, tabel B.52.14
I_Z.TL.tabel := |I_MA1.2.1|/k_t = 43.75 A
# Tabel 45 i NKT tekniske katalog à
# S = 5G10mm^2H07RN-F [54 A, 5-leder ledninger/ 3 belastede ledere]
# 3. Kontroller om kortslutningsudløseren på motorværnet er effektiv.
# I opgaven er der ikke angivet hvor lang tilledningen til maskinanlægget er. I denne løsning er længden sat til 3 m:
r_6.Cu := 3.08 Ω/km
x_6.Cu := 0.08 Ω/km
r_10.Cu := 1.91 Ω/km
l_W3 := 15 m
l_W3.TL := 3 m
Z_W3.min := l_W3*(r_6.Cu + 1j*x_6.Cu) = (46.2 + 1.2i) mΩ
Z_W3.max := l_W3*(1.5*r_6.Cu + 1j*x_6.Cu) = (69.3 + 1.2i) mΩ
Z_W3.TL.min := l_W3.TL*r_10.Cu = 5.73 mΩ
Z_W3.TL.max := l_W3.TL*1.5*r_10.Cu = 8.595 mΩ
I_K3F.max.MA1.2.1 := U_f/(Z_net.min + Z_W0.0.min + Z_W2.min + Z_W3.min + Z_W3.TL.min) = (3.42295 - 0.82043i) kA
I_KFPE.min.MA1.2.1 := U_f/(Z_net.max + Z_W0.0.max + 2*(Z_W2.max + Z_W3.max + Z_W3.TL.max)) = (1.2008 - 0.143518i) kA
# I_d:
|I_MA1.2.1.inrush|*1.2 = 504 A
I_d = 819 A
|I_KFPE.min.MA1.2.1|*0.8 = 967.48 A
|I_MA1.2.1.inrush|*1.2 ≤ I_d ≤ |I_KFPE.min.MA1.2.1|*0.8 = 1  # Kortslutningsudløseren er effektiv.
# 2.5 Dimensionering af gruppeledning -W4 til CEE-stikkontakt:
# 1. Vælg automatsikring.
|I_CEE| = 16 A
I_n.sik := 16 A
|I_CEE| ≤ I_n.sik = 1  # OK.
|I_K3F.max.A1.2| = 12.6284 kA
I_CU := 15 kA
|I_K3F.max.A1.2| ≤ I_CU = 1  # OK.
I_CEE.inrush := I_CEE = 16 A
I_m.min := 5*I_n.sik = 80 A
|I_CEE.inrush| ≤ I_m.min = 1  # OK.
I_m.max := 10*I_n.sik = 160 A
# FB (BIB) er OK i CEE, men ikke nødvendig, hvis der er krav om RCD. I_KFPE.min.CEE Hentes fra længere ned.
I_KFPE.min.CEE := 897.466 A
I_m.max ≤ I_KFPE.min.CEE = 1  # à
# Automatsikring:  iC60H 16 A, C-kar. 3P
# Da BEK 1082/2016 § 35 foreskriver at alle tilslutningsteder op til 32 A skal beskyttes af en RCD på max. 30 mA, Vælger jeg at installere en RCD, type A, 30 mA, 4-pol, 16 A.
# Fejlbeskyttelse RCD:
I_e := 25 A
|I_CEE| = 16 A
|I_CEE| ≤ I_e = 1  # OK.
# OK, men ikke nødvendig da 16 A AS. bryder (back-up).
I_CN := 15 kA
|I_K3F.max.A1.2| = 12.6284 kA
|I_K3F.max.A1.2| ≤ I_CN = 1  # à
# RCD:  Schneider ID 25 / 0,03 / 4P klasse A.
# (t = momentan. Krav ifølge bek.1082, idet I_n ≤ 32*A)
# 2. Dimensioner kablet -W4 til CEE-stikkontakten.
I_Z.W4.tabel ≥ I_n/(k_t*k_s)
I_CEE = 16 A
I_n.sik = 16 A
# Fremføring på kabelstige, nr. 34-E, tabel B.52.12, kol. 3 (90°C CU-kabel):
k_t := 0.96  # 35°C, tabel B.52.14
k_s := 0.87  # 2-strømkredse, tabel B.52.20
I_Z.CEE.tabel := I_n.sik/(k_t*k_s) = 19.1571 A
# NOTE: Da -W3 og -W4 ligger ikke indenfor 3 standardtværsnit, så skal ny k_s berenges:
n_kabel := 2 stk
k_s := 1/sqrt(n_kabel) = 0.707107
I_Z.W3.tabel := I_n.sik/(k_t*k_s) = 23.5702 A
# Fremføring på væg af beton, nr. 20-C, tabel B.52.5, kol. 6 (90°C CU-kabel):
k_t := 0.96  # 35°C, tabel B.52.14
k_s := 1  # Alene, tabel B.52.20
I_Z.W3.tabel := I_n.sik/(k_t*k_s) = 16.6667 A
# S = 5G2,5mm^2NOSKLX medico 90  [32 A]
r_2.5.Cu := 7.41 Ω/km
x_2.5.Cu := 0.08 Ω/km
l_W4 := 10 m
Z_W4.min := l_W4*(r_2.5.Cu + 1j*x_2.5.Cu) = (74.1 + 0.8i) mΩ
Z_W4.max := l_W4*(1.5*r_2.5.Cu + 1j*x_2.5.Cu) = (111.15 + 0.8i) mΩ
I_K3F.max.CEE := U_f/(Z_net.min + Z_W0.0.min + Z_W2.min + Z_W4.min) = (2.60538 - 0.45079i) kA
I_KFPE.min.CEE := U_f/(Z_net.max + Z_W0.0.max + 2*(Z_W2.max + Z_W4.max)) = (894.222 - 76.2369i) A
# 3. Undersøg / redgør for hvordan CEE-stikkontakten fejlbeskyttes (BIB'es).
# Da der er installeret en RCD i et TN-system, vil FB, BIB altid være OK.
