kWh := kW*hr
kmol := 1000 mol
B_HFO := 3.4
kJ := 1000 J
MWh := kWh*10^3
α := 0.00075 K^-1
R_m := 8.314472 J/(mol*K)
var := W
MJ := 10^6 J
dm := 0.1 m
VA := W
kg_oil := kg
degC := °C
g := 9.817 m/s^2
kVA := kV*A
kg_air := kg
μWb := 10^-6 Wb
∡(x) := arg(x)
m_air := m^3
mWb := 10^-3 Wb
ρ_vand := 980 kg/m^3
mΩ := 10^-3 Ω
m_oil := m^3
μN := 10^-6 N
µF := 10^-6 F
pct := 0.01
kr := 1
stk := 1
ρ_luft := 1.2 kg/m^3
kvar := 10^3 var
rpm := min^-1
HK := 0.736 kW
µε := 10^-6
mH2O := 9806.383 Pa
μS := 10^-6 S
øre := kr/100
mT := 10^-3 T
mmH2O := 10^-3 mH2O
rps := s^-1
mN := 10^-3 N
mmHg := 133.322 Pa
mF := 10^-3 F
cSt := mm^2/s
MVA := 10^6 VA
sømil := knot*hr
Nm := N*m
Mvar := 10^6 var
μT := 10^-6 T
kNm := kN*m
C_p.vand := 4.2 kJ/(kg*K)
mbar := 10^-3 bar
# OPGAVE 1.
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S_KN := 100 MVA
φ_KN := acot(0.18)
U_n := 10 kV
l_lang := 9 km
l_kort := 5 km
S_T8 := 800 kVA
U_1N := 10 kV
U_2N := 0.4 kV
U_f := U_2N/sqrt(3)
P_Cu.T8 := 8500 W
e_k.T8 := 6%
I'_linje := 310 A
t'_linje := 1.2 s
I_J := 25 A  # TN-system.
# Generelle beregninger: | à
Z_net := (U_n^2/S_KN) ∠ φ_KN = (0.177153 + 0.984183i) Ω
e_r.T8 := P_Cu.T8/S_T8 = 0.010625
Z_1.T8 := (U_1N^2*e_k.T8/S_T8) ∠ acos(P_Cu.T8/(S_T8*e_k.T8)) = (1.32813 + 7.38147i) Ω
I_1.T8 := S_T8/(U_1N*sqrt(3)) = 46.188 A
n := U_1N/U_2N = 25
I_2.T8 := I_1.T8*n = 1.1547 kA
# ELLER:
I_2.T8 := S_T8/(U_2N*sqrt(3)) = 1.1547 kA
I_T8.inrush := 15*I_1.T8 = 692.82 A
r_240.Al := 0.125 Ω/km
x_240.Al := 0.087 Ω/km
# r og x hentes fra bog 5 side 121.
# eller fra Viggos LFS.
Z_240.min := l_kort*(r_240.Al + 1j*x_240.Al) = (0.625 + 0.435i) Ω
Z_240.max := l_lang*(r_240.Al + 1j*x_240.Al) = (1.125 + 0.783i) Ω
# 1.1 Bestem den største tilladte overføringsevne for ringforbindelsens kabel under hensyntagen til givne forudsætninger.
I_Z.240.jord := 400 A
I_Z.240.luft := 400 A  # Bog 5 side 121, eller Viggos LFS.
k_tj := 1  # 15°C, tabel 62 NKT.
k_s := 0.87  # 2-strømkredse med 25 cm imellem, tabel 64 NKT.
k_d := 0.99  # 71-90 cm, tabel 65 NKT.
# R_tm := 1.2 K*m/W Tabel 66 NKT.
k_tm := 0.93
k_tl := 0.85  # 40°C, døgnmiddeltemperatur, tabel 63 NKT.
# Overføringsevne i jord:
I_Z.240.jord := I_Z.240.jord*k_s*k_tj*k_d*k_tm = 320.404 A
# Overføringsevne i luft:
I_Z.240.luft := I_Z.240.luft*k_tl = 340 A
# Kablets overføringsevne:
I_Z.240 ≤ I_Z.240.jord and I_Z.240.luft == 320.404 A  # à
I_Z.240 := I_Z.240.jord = 320.404 A
# 1.2 Afklar, hvorvidt ringforbindelsens kabel er kortslutningsbeskyttet med de aktuelle relæ-indstillinger. Giv om nødvendigt forslag til korrektion af indstillinger.
I_K3F.for := U_1N/(Z_net*sqrt(3)) = (1.02279 - 5.68219i) kA
I_K2F.for := sqrt(3)/2*I_K3F.for = (0.885765 - 4.92092i) kA
I_K1s.fase := 22.6 kA*sqrt(s)
I_K1s.skærm := 7 kA*sqrt(s)
t'_linje = 1.2 s
t_e := 0.1 s
|I_K3F.for|*sqrt(t'_linje + t_e) = 6.58281 s^(1/2)*kA
|I_K3F.for|*sqrt(t'_linje + t_e) ≤ I_K1s.fase = 1  # OK.
|I_K2F.for|*sqrt(t'_linje + t_e) = 5.70088 kA*s^(1/2)
|I_K2F.for|*sqrt(t'_linje + t_e) ≤ I_K1s.skærm = 1  # OK.
# NOTE: Skærmens formål er at føre nogen pladestrøm og jordfejlstrøm, som ikke skal går ind i lederne.
# Kablet (ringen) er kortslutningsbeskyttet.
# Det er ikke nødvendigt at kontrollere for I_K.min, da I'_linje = 310 A er stillet lavere end I_Z.240 = 320.404 A.
# 1.3 Beregn største og mindste kortslutningseffekt og tilhørende R/X-forhold på primærsiden af transformer -T8. I beregninger forudsættes nominelt spændings-niveau.
I_K3F.max.T8.HV := U_n/((Z_net + Z_240.min)*sqrt(3)) = (1.74268 - 3.08318i) kA
U_n = 10 kV
S_KN.max.T8.HV := U_n*conj(I_K3F.max.T8.HV)*sqrt(3) = (30.1841 + 53.4023i) MVA
I_K3F.min.T8.HV := U_n/((Z_net + Z_240.max)*sqrt(3)) = (1.56022 - 2.11741i) kA
S_KN.min.T8.HV := U_n*conj(I_K3F.min.T8.HV)*sqrt(3) = (27.0238 + 36.6747i) MVA
cot(arg(S_KN.max.T8.HV)) = 0.565222
cot(arg(S_KN.min.T8.HV)) = 0.736852
# Men skal den mindste kortslutningseffekt ikke beregnes med hjælp af I_K2F.min.T8:
I_K2F.min.T8.HV := I_K3F.min.T8.HV*sqrt(3)/2 = (1.35119 - 1.83373i) kA
# ELLER:
I_K2F.min.T8.HV := U_n/(2*(Z_net + Z_240.max)) = (1.35119 - 1.83373i) kA
S_KN.min.T8.HV := U_n*conj(I_K2F.min.T8.HV)*sqrt(3) = (23.4033 + 31.7612i) MVA
cot(arg(S_KN.min.T8.HV)) = 0.736852
# 1.4 Hvilke overordnede krav stilles der til mærkeoverstrømsfaktor (rated overcurrent factor) for strømtransformere til overstrømsbeskyttelses-udstyr, herunder relæbeskyttelsen for transformer -T8
# DS/HD 61369: 2011 pkt. 6.2.4.1 Strømtransformere:
# Overstrømsfaktorens mærkeværdi og mærkebelastningen skal vælges, så det sikres, at beskyttelsesmateriellet fungerer korrekt, og at beskadigelse af målemateriel i tilfælde af kortslutning undgås. I højspændingsnet, hvor den primære tidskonstant er stor, og hvor genindkobling anvendes, anbefales det at tage hensyn til den kortvarige påvirkning, der kan opstå som følge af en aperiodiske del af kortslutningsstrømmen. Der bør tages højde for anbefalingerne i IEC 60044-6.
# 1.5 Foretag valg af relæ og strømtransformere til transformerstation -T8 og giv forslag til de nødvendige indstillinger for relæbeskyttelsen.
# Der regnes med at transformeren skal kunne belastes med 120%:
# Valg af relæ:  ABB REF615
# Valg af relæets mærkestrøm:  I_n.relæ := 5 A
# k_i:
I_1.ki ≥ 120%*I_1.T8
120%*I_1.T8 = 55.4256 A
I_1.ki := 100 A
# à
k_i := 100/5
I'_relæ := 120%*I_1.T8/(k_i*I_n.relæ) = 0.554256  # à
I'_relæ := 0.6
# à
I'_T1 := I'_relæ*k_i*I_n.relæ = 60 A
# For at være sikker på selektivitet imellem linje- og transformerrelæet, ønskes der en Δt på mindst 0,2 s:
# Δt := 0.2 s
t'_linje = 1.2 s
t'_T := t'_linje - Δt = 1 s
# à
t'_T := 0.8 s
U_n = 10 kV
I_K2F.min.T8.HV := (U_n/((Z_net + Z_240.max)*sqrt(3)))*sqrt(3)/2 = (1.35119 - 1.83373i) kA
# ELLER:
I_K2F.min.T8.HV := U_n/(2*(Z_net + Z_240.max)) = (1.35119 - 1.83373i) kA
I'_K3F.max.T8.LV := U_n/((Z_net + Z_240.min + Z_1.T8)*sqrt(3)) = (150.009 - 619.72i) A
I''_relæ := |I'_K3F.max.T8.LV|/(k_i*I_n.relæ) = 6.37617
# à
I''_relæ := 8  # à
I''_T2 := I''_relæ*k_i*I_n.relæ = 800 A
# Alternativ kan man også bruge I_T.inrush:
I''_relæ := I_T8.inrush/(k_i*I_n.relæ) = 6.9282
# à
I''_relæ := 8  # à
I''_T8 := I''_relæ*k_i*I_n.relæ = 800 A
|I_K2F.min.T8.HV|*0.75 = 1.70834 kA
I''_T2 = 800 A
I_T8.inrush = 692.82 A
|I_K2F.min.T8.HV|*0.75 ≥ I''_T2 ≥ I_T8.inrush and |I'_K3F.max.T8.LV| = 1  # OK.
t''_T := 0.04 s  # Pga. personsikkerhed så mindst som muligt.
# Er valget af transformeren i orden?
# Forventes ikke af de studerende!
I_th := 12.5 kA*sqrt(s)
|I_K3F.max.T8.HV|*sqrt(t''_T + t_e) = 1.32515 s^(1/2)*kA
I_th ≥ |I_K3F.max.T8.HV|*sqrt(t''_T + t_e) = 1  # OK.
κ := (1.02 + 0.98*e^(-3*0.57)) = 1.19725
I_K3F.max.T8.HV*κ = (2.08642 - 3.69134i) kA
I_dyn := 2.5*I_th = 31.25 kA*s^(1/2)
I_dyn ≥ |I_K3F.max.T8|*κ  # OK.
I_ki.1 := 100 A
osf := 20
I_mæt := I_ki.1*osf = 2 kA
I''_T8*1.1 = 880 A
I_mæt ≥ I''_T8*1.1 = 1  # OK.
# 1.6 Forklar med ord og forhold, der ved dimensioneringen af jordingsanlægget sikrer mod, at grænsen for den tilladelige potentialestigning ikke overskrides.
# Ved beregningen R_E ≤ U_TP/I_E sættes I_E == I_J , hvor I_J er den beregnede kapacitive jordfejlstrøm i distributionsnettet (afgange på hovedstation).
# Herved forudsættes det at hele den kapacitive jordfejlstrøm gennemløber den aktuelles transformerstations jordingsanlæg, dette er ikke tilfældet, idet strømmen vil fordele sig over alle jordingsanlæg i distributionsnettet. Herved regnes med en større I_E end der aktuelt vil løbe igennem aktuelle jordingsanlæg, hvorved U_TP aldrig vil nås.
# 1.7 Dimensioner beskyttelses-, drifts- og fællesjord for transformerstationen, -T8, og beregn i den sammenhæng også den største tilladelige overgangsmodstand for jordelektrode-systemet.
I_K2F.max.T8.HV := I_K3F.max.T8.HV*sqrt(3)/2 = (1.50921 - 2.67012i) kA
I_KFN.max.T8.LV := I'_K3F.max.T8.LV*n = (3.75022 - 15.493i) kA
k := 226*A*sqrt(s)/mm^2
Θ_f := 300
Θ_i := 40
β := 234.5
t_e = 0.1 s
S_BJ := |I_K2F.max.T8.HV|/k*sqrt((t''_T + t_e)/ln((Θ_f + β)/(Θ_i + β))) = 6.2205 mm^2
# à
S_BJ := 16 mm^2
# Min. krav ifølge DS/EN 50522 pkt. 5.2.2 er 16 mm^2
# NOTE: Hvis der regnes med relæstid, så skal der regnes med I_K2F.max, og hvis der regnes med sikringstid, så skal regnes med I_K2F.min.
S_DJ := |I_KFN.max.T8.LV|/k*sqrt((t'_T + t_e)/ln((Θ_f + β)/(Θ_i + β))) = 81.9694 mm^2
# à
S_DJ := 95 mm^2
S_jordskinne ≥ S_BJ and S_DJ == 81.969 mm^2
# à
S_jordskinne := 20 mm^2*5 = 100 mm^2
# Da det er TN-system:
U_TP := 80 V
I_J = 25 A
R_E.T := U_TP/I_J = 3.2 Ω
# OPGAVE 2.
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# TN-S-system.
S_T := 500 kVA
U_1N := 10 kV
U_2N := 0.4 kV
U_f := 230 V
I_K3F.max.A1 := 11 kA ∠ -acos(0.31)  # à
I_KFN.min.A1 := I_K3F.max.A1
U_n := 400 V
P_Cu.T := 5800 W
e_k.T := 4%
# Generelt:
# Ved overstrømsbeskyttelse ≤ 20 A for grupper med stikkontakter og ≤ 32 A for øvrige grupper er der et generelt krav i bekendtgørelse 1082 om supplerende beskyttelse med RCD.
# DS/HD 60364-4-41 411.3.3 stiller et lignende krav.
# Ved beregninger af HL’er er der ikke taget hensyn til -W2, idet dens belastning er under 30% og det kan derfor ses bort fra denne ved fastlæggelse af reduktionsfaktor pga. samlet fremføring, DS/HD 60364-5-52:2011 pkt. 523.5.
# NOTE: Da vi har I_K ved tavle -A1, så betyder det at net-impedansen indeholder også transformer-impedansesn, derfor skal ikke regnes med Z_2.T i kortslutningsberegninger.
# Generelle beregninger:
Z_net.T := U_f/I_K3F.max.A1 = (6.48182 + 19.879i) mΩ
Z_2.T := (U_2N^2*e_k.T/S_T) ∠ acos(P_Cu.T/(S_T*e_k.T)) = (3.712 + 12.2499i) mΩ
I_1.T := S_T/(U_1N*sqrt(3)) = 28.8675 A
n := U_1N/U_2N = 25
I_2.T := I_1.T*n = 721.688 A  # ELLER:
I_2.T := S_T/(U_2N*sqrt(3)) = 721.688 A
I_T.inrush := 15*I_1.T = 433.013 A
# Belastninger under tavle -A1:
# Tavle -A2:
S_A2 := 20.5 kVA ∠ acos(0.9)
I_A2 := (conj(S_A2)/(U_n*sqrt(3)))*0.65 = (17.3097 - 8.38346i) A
# Tavle -A3:
I_A3 := (148 A ∠ -acos(0.85))*0.9 = (113.22 - 70.1675i) A
# Tavle -A4:
I_MA1 := 14 A ∠ -acos(0.86)
I_MA1.start := 3*(|I_MA1| ∠ -acos(0.3)) = (12.6 - 40.0654i) A
I_MA1.inrush := 2*I_MA1.start = (25.2 - 80.1309i) A
I_MA2 := 35 A ∠ -acos(0.91)
I_MA2.start := 6*(|I_MA2| ∠ -acos(0.35)) = (73.5 - 196.717i) A
I_MA2.inrush := 2*I_MA2.start = (147 - 393.435i) A
I_ab.A4 := 85 A ∠ -acos(0.85)
I_A4 := I_MA1 + I_MA2 + I_ab.A4 = (116.14 - 66.4319i) A
I_A4.start := I_MA1.start + I_MA2.start + I_ab.A4 = (158.35 - 281.559i) A
I_A4.inrush := I_MA1.inrush + I_MA2.inrush + I_ab.A4 = (244.45 - 518.342i) A
I_ab.A1 := (310 A ∠ -acos(0.93))*0.85 = (245.055 - 96.8519i) A
I_A1 := I_A2 + I_A3 + I_A4 + I_ab.A1 = (491.725 - 241.835i) A
I_A1.start := I_A2 + I_A3 + I_A4.start + I_ab.A1 = (533.935 - 456.962i) A
I_A1.inrush := I_A2 + I_A3 + I_A4.inrush + I_ab.A1 = (620.035 - 693.745i) A
# 2.1 Hovedledning -W3 fra -A1 til -A3:
# 2.1.1 Valg af maksimalafbryder (MCCB) og foretag de nødvendige indstillinger.
|I_A3/0.9| = 148 A
I_n := 160 A
|I_A3| ≤ I_n = 1
I_CU := 25 kA
I_CS := 25 kA
# Kontrol af kortslutningsbrydeevnen:
|I_K3F.max.A1| = 11 kA
|I_K3F.max.A1| ≤ I_CU = 1
|I_K3F.max.A1| ≤ I_CS = 1  # OK.
# MA:  Compact NSX160B
# Relæ:
# Mic 2
# I_n = 160 A
# Ir = (63-150-160) A
# I_i := 2400 A
I_0 := 150 A
I_rx := |I_A3/0.9|/I_0 = 0.986667  # à
I_rx := 1
I_r := I_0*I_rx = 150 A
# I_sd:
I_A3.start := |I_A3/0.9| = 148 A
|I_A3.start|*1.2 = 177.6 A
# Da det er den første MA i installationen af hensyn til selektivitet.
I_r = 150 A
I_rx := |I_A3.start|*1.2/I_r = 1.184  # à
5
# 3-10, indstilles lavt pga. selektivitet, her vælger jeg 5:
I_sd := I_r*5 = 750 A
I_KFPE.min.A3 := 4.573 kA
|I_KFPE.min.A3|*0.8 = 3.6584 kA
# I_KFPE.min.A3 hentes fra længere ned.
|I_A3.start|*1.2 ≤ I_sd ≤ I_KFPE.min.A3*0.8 = 1  # FB, BIB i -A3 er OK.
# I_i:
I_A3.inrush := |I_A3/0.9| = 148 A
|I_A3.inrush|*1.2 = 177.6 A
I_i = 2400 A
|I_A3.inrush|*1.2 ≤ I_i = 1  # OK.
# 2.1.2 Dimensioner hovedledningen -W3.
I_Z.W3.tabel ≥ I_n/(k_t*k_s)
|I_A3/0.9| = 148 A
I_r = 150 A
# Fremføring på kabelstige, nr. 34-E, tabel B.52.11 kol. 3 (70°C AL-kabel):
k_t := 1.12  # 20°C, tabel B.52.14
k_s := 0.87
# 2-strømkredse, tabel B.52.20
I_Z.W3.tabel := I_r/(k_t*k_s) = 153.941 A
# I svejsehalen:
k_t := 0.94  # 35°C, tabel B.52.14
k_s := 1  # Alene, tabel B.52.20
I_Z.W3.tabel := I_r/(k_t*k_s) = 159.574 A
# NOTE: Da der ikke står i opgaven man skal vælge reduceret PE-leder, så vælger jeg samme størelse og materiel som fase-lederen:
# S = 4X95mm^2NOIK-AL-M 70 [183 A] + 1G95mm^2NOIK-AL 70
r_95.Al := 0.321 Ω/km
x_95.Al := 0.08 Ω/km
l_W3 := 38 m
Z_W3.min := l_W3*(r_95.Al + 1j*x_95.Al) = (12.198 + 3.04i) mΩ
Z_W3.max := l_W3*(1.5*r_95.Al + 1j*x_95.Al) = (18.297 + 3.04i) mΩ
I_K3F.max.A3 := U_f/(Z_net.T + Z_W3.min) = (4.91452 - 6.02982i) kA
I_KFPE.min.A3 := U_f/(Z_net.T + 2*Z_W3.max) = (3.91692 - 2.36047i) kA
# 2.1.3 Kontroller om anbefalingen vedr. spændingsfaldet er overholdt.
# I følge Anneks G tabel G.52.1 pkt. B, gælder:
ΔU_f.ændring.max := 6%
b_3F := 1
b_FN := 2  # Ikke aktuel i denne opgave.
# Kontroller om spændingsfald:
ΔU_f.W3 := Re((I_A3/0.9)*l_W3*(1.25*r_95.Al + 1j*x_95.Al)) = 2.15515 V
ΔU_f.ændring := ΔU_f.W3/U_f = 0.0093702  # Hvilket er mindre end 1,5%, som opgaven tillader, så OK.
# NOTE: Når virksomheden selv står for drift og vedligehold anses det som en privat lavspændingsforsyning.
# 2.1.4 Kontroller om kortslutningsudløseren er effektiv.
# Som vist i opgave 2.1.1 er |I_A3.start|*1.2 ≤ I_sd ≤ |I_KFPE.min.A3|*0.8 = 1, hvorved kortslutningsudløseren er effektiv, desuden FB og BIB er OK.
# 2.1.5 Kontrol om hovedledning -W3 er kortslutningsbeskyttet.
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# KB kontrolleres ud fra I_K3F.max.A1:
|I_K3F.max.A1| = 11 kA
# Kablet kan tåle:
S := 95 mm^2
k := 76*A*sqrt(s)/mm^2
# k-værdien findes i Tabel 43A (Håndbog)
(S*k)^2 = 52128400 A^2 s
I2t_smelte := (4*10^5) s*A^2
I2t_smelte ≤ (S*k)^2 = 1  # KB af HL er OK.
# 2.2 Hovedledning -W4 fra -A1 til -A4.
# 2.2.1 Fastlæg belastingen på havedledning -W4.
I_A4 = (116.14 - 66.4319i) A
I_A4.start = (158.35 - 281.559i) A
I_A4.inrush = (244.45 - 518.342i) A  # Se under Generelle beregninger.
# 2.2.2 Valg af smeltesikring -F4.
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# Jeg forudsætter er startstrømmen kun kan forekomme i 5 s. Og derfor kan en 160 A NH00 sikring godt holde til startstrømmen. Ved 323 A kan sikringen holde i 200 s, hvilket er mere end 5 s.
|I_A4| = 133.797 A
I_n.sik := 160 A
|I_A4| ≤ I_n.sik = 1  # OK.
|I_A4.start| = 323.033 A
t_start := 5 s
I_n.5s := (7*10^2) A
|I_A3.start| ≤ I_n.5s = 1  # OK.
# Smeltesikring:  NH00 gG 160 A.
# NOTE: 5 s, fordi startstrømmen er på Imax. 5 s start på tiden og kør ud til kurven og derefer ned.
# 2.2.3 Valg af sikringsafbryder (sikringslastadskiller).
I_e := 160 A
I_n.sik = 160 A
I_n.sik ≤ I_e = 1  # OK.
# Sikringslastadskiller:  Fupact INFD160 3P+N (N valgfri)
# 2.2.4 Dimensioner hovedledningen -W4.
I_Z.W4.tabel ≥ I_n/(k_t*k_s)
|I_A4| = 133.797 A
I_n.sik = 160 A
# Fremføring på kabelstige, nr. 34-E, tabel B.52.11 kol. 3 (70°C AL-kabel):
k_t := 1.12  # 20°C, tabel B.52.14
k_s := 0.87
# 2-strømkredse, tabel B.52.20
I_Z.W4.tabel := I_n.sik/(k_t*k_s) = 164.204 A
# I værksted:
k_t := 1.06  # 25°C, tabel B.52.14
k_s := 1  # Alene, tabel B.52.20
I_Z.W4.tabel := I_n.sik/(k_t*k_s) = 150.943 A
# NOTE: Da der ikke står i opgaven man skal vælge reduceret PE-leder, så vælger jeg samme størelse og materiel som fase-lederen:
# S = 4X95mm^2NOIK-AL-M 70 [183 A] + 1G95mm^2NOIK-AL 70
r_95.Al := 0.321 Ω/km
x_95.Al := 0.08 Ω/km
l_W4 := 31 m
Z_W4.min := l_W4*(r_95.Al + 1j*x_95.Al) = (9.951 + 2.48i) mΩ
Z_W4.max := l_W4*(1.5*r_95.Al + 1j*x_95.Al) = (14.9265 + 2.48i) mΩ
I_K3F.max.A4 := U_f/(Z_net.T + Z_W4.min) = (4.90873 - 6.67899i) kA
I_KFPE.min.A4 := U_f/(Z_net.T + 2*Z_W4.max) = (4.31397 - 2.9491i) kA
# 2.2.5 Beregn energitabet ved 8 timers drift for hovedledning -W4.
# For at finde energitabet ved dirftstemperatur, anvendes faktor 1,25 på R:
E_W4 := (3*|I_A4^2|*l_W4*r_95.Al*1.25)*8 hr = 5.34419 kWh
# 2.3 Gruppeledning -W5 fra -A4 til -MA1:
# 2.3.1 Valg af automatsikring (MCB).
|I_MA1| = 14 A
I_n.sik := 16 A
|I_MA1| ≤ I_n.sik = 1  # OK.
|I_K3F.max.A4| = 8.28882 kA
I_CU := 10 kA
|I_K3F.max.A4| ≤ I_CU = 1  # OK.
|I_MA1.inrush| = 84 A
I_m.min := 10*I_n.sik = 160 A
|I_MA1.inrush| ≤ I_m.min = 1  # OK.
I_m.max := 14*I_n.sik = 224 A
# FB, BIB er OK i -MA1, men ikke nødvendig, hvis der er krav om RCD. I_KFPE.min.MA1 Hentes fra længere ned.
I_KFPE.min.MA1 := 686.783 A
I_m.max ≤ I_KFPE.min.MA1 = 1  # à
# Automatsikring:  iC60N 16 A, D-kar. 3P
# Da BEK 1082/2016 § 35 foreskriver, at alle tilslutningsteder op til 32 A skal beskyttes af RCD på max. 30 mA vælger jeg at installere en RCD, type A, 30 mA, 4P, 40 A.
# Fejlbeskyttelse BIB-RCD:
I_e := 25 A
|I_MA1| = 14 A
|I_MA1| ≤ I_e = 1  # OK.
I_CN := 10 kA
|I_K3F.max.A4| = 8.28882 kA
|I_K3F.max.A4| ≤ I_CN = 1  # à  # OK, men ikke nødvendig, da 16 A AS. bryder (back-up).
# RCD:  Schneider ID 25 / 0,03 / 4P klasse A.
# (t = momentan. Krav ifølge bek.1082, idet I_n ≤ 32*A)
# 2.3.2 Dimensioner gruppeledningen -W5.
I_Z.W5.tabel ≥ I_n/(k_t*k_s)
|I_MA1| = 14 A
I_n = 160 A
# Fremføring på væg, nr. 20-C, tabel B.52.4 kol. 6 (70°C CU- kabel):
k_t := 1.06  # 25°C, tabel B.52.14
k_s := 0.85  # 2-strømkredse, tabel B.52.17
I_Z.W4.tabel := I_n.sik/(k_t*k_s) = 17.758 A
# S = 5G2,5mm^2NOIKLX [24 A]
# 2.3.3 Dimensioner tilledningen til forsyningsadskiller til -MA1.
|I_MA1| = 14 A
k_t := 1  # 25°C, HD 516.
I_Z.TL.tabel := |I_MA1|/k_t = 14 A
# Tabel 45 i NKT tekniske katalog à
# S = 5G1,5mm^2H07RN-F [16 A, 5-leder ledninger / 3-belastede ledere]
r_2.5.Cu := 7.41 Ω/km
x_2.5.Cu := 0.08 Ω/km
r_1.5.Cu := 13.3 Ω/km
l_W5 := 8 m
l_TL := 3 m
Z_W5.min := l_W5*(r_2.5.Cu + 1j*x_2.5.Cu) = (59.28 + 0.64i) mΩ
Z_W5.max := l_W5*(1.5*r_2.5.Cu + 1j*x_2.5.Cu) = (88.92 + 0.64i) mΩ
Z_MA1.TL.min := l_TL*r_1.5.Cu = 39.9 mΩ
Z_MA1.TL.max := l_TL*1.5*r_1.5.Cu = 59.85 mΩ
I_K3F.max.MA1 := U_f/(Z_net.T + Z_W4.min + Z_W5.min + Z_MA1.TL.min) = (1.91367 - 0.380689i) kA
I_KFPE.min.MA1 := U_f/(Z_net.T + 2*(Z_W4.max + Z_W5.max + Z_MA1.TL.max)) = (684.691 - 53.5634i) A
# 2.4 Gruppeledning -W6 fra -A4 til -MA2:
# 2.4.1 Valg af håndbetjent motorværn (MMS) og foretag de nødvendige indstillinger.
|I_MA2| = 35 A
I_n := 50 A
|I_MA2| ≤ I_n = 1
# HM:  GV7 RE50
# Ir = (30-35-50) A
# I_CU := 36 kA
# I_d := □ A
# Da startstrømmen kun er angivet til 6*|I_MA2| = 210 A, så vil den ikke blive påvirket.
|I_K3F.max.A4| = 8.28882 kA
I_CU = 36 kA
|I_K3F.max.A4| ≤ I_CU = 1  # OK.
I_n.5s := □*|I_MA2| = 700 A
|I_MA2.start| = 210 A
|I_MA2.start| ≤ I_n.5s = 1  # Ikke aktuelt i denne opgave.
# I_d:
# NOTE: I de HM'er, som man ikke kender I_d, så beregnes på den måde:
I_r.max := I_n = 50 A
I_d := 13*I_r.max = 650 A
|I_MA2.inrush|*1.2 = 504 A  # 1,2 er en ekstra sikkerhedsfaktor og kan også fjernes.
# 0,8 er en ekstra sikkerhedsfaktor og kan også fjernes.
|I_MA2.inrush|*1.2 ≤ I_d*0.8 = 1  # OK.
# FB, BIB i -MA2 er OK, men ikke nødvendig, hvis BIB'es med HPFI (RCD).
I_KFPE.min.MA2 := 1.032 kA
I_d*1.2 ≤ |I_KFPE.min.MA2|*0.8 = 1  # à
# 2.4.2 Dimensioner gruppeledningen -W6.
I_Z.W6.tabel ≥ I_n/(k_t*k_s)
|I_MA2| = 35 A
I_n = 50 A
# Fremføring på væg, nr. 20-C, tabel B.52.4 kol. 6 (70°C CU- kabel):
k_t := 1.06  # 25°C, tabel B.52.14
k_s := 0.85  # 2-strømkredse, tabel B.52.17
I_Z.W4.tabel := |I_MA2|/(k_t*k_s) = 38.8457 A
# S = 5G6mm^2NOIKX-FLEX 70 [41 A] eller 4X6mm^2NOIKX-FLEX 70, pga. klasse II materiel.
# NOTE: W5 og W6 er inden for 3 standard S (2,5-4-6).
r_6.Cu := 3.08 Ω/km
x_6.Cu := 0.08 Ω/km
l_W6 := 18 m
l_TL := 2 m
Z_W6.min := l_W6*(r_6.Cu + 1j*x_6.Cu) = (55.44 + 1.44i) mΩ
Z_W6.max := l_W6*(1.5*r_6.Cu + 1j*x_6.Cu) = (83.16 + 1.44i) mΩ
Z_MA2.TL.min := l_TL*r_6.Cu = 6.16 mΩ
Z_MA2.TL.max := l_TL*1.5*r_6.Cu = 9.24 mΩ
I_K3F.max.MA2 := U_f/(Z_net.T + Z_W4.min + Z_W6.min + Z_MA2.TL.min) = (2.69664 - 0.822443i) kA
I_KFPE.min.MA2 := U_f/(Z_net.T + 2*(Z_W4.max + Z_W6.max + Z_MA2.TL.max)) = (1.024 - 0.128357i) kA
# 2.5 Kontroller om startstrømme fra -MA1 og -MA2 ikke utilsigtet udkobler beskyttelsesudstyr -F4 ved samtidig start af begge maskiner.
# (hvis resultatet viser utilstigtet, skal der ikke fortages ændringer i tidligere besvarelser)
# Som det fremgår i opgave 2.2.2, valg af smeltestikring, sker der ingen utilsigtet udkobling ved start af de to motorer på samme tid.
# 2.6 Tegn et kredsskema (enstregsskema) af installationen fra tavle -A1.
# Kredsskemaet skal indeholde oplysninger omde i opgave 2.1, 2.2, 2.3, og 2.4 fundne resultater.
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# 2.7 Kontroller at tavle -A3 (klasse I) er fejlbeskyttet (BIB).
# Som vist i opgave 2.1.1 er |I_A3.start|*1.2 ≤ I_sd ≤ |I_KFPE.min.A3|*0.8 = 1, hvorved kortslutningsudløseren er effektiv, dermed FB, BIB i -A3 er OK, hermed er kravet i DS/HD 60364-4-41 pkt. 411.3.2.3 opfyldt (TN-system):
t_FB.411.3.2.3 := 5 s
t_MA := 80 ms
t_MA ≤ t_FB.411.3.2.3 = 1  # Tavlen -A3 er FB, BIB.
# 2.8 undersøg selektiviteten mellem smeltesikring -F4 og automatsikring (MCB) til -MA1.
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# Der er total selektivitet.
# Det kan vises også med beregning:
# Selektivitet-kontrol ud fra I_K3F.max.A4:
|I_K3F.max.A4| = 8.28882 kA
I2t_smelte.F4 := (6*10^4) s*A^2
I2t_smelte.MA1 := (2*10^4) s*A^2
I2t_smelte.MA1 < I2t_smelte.F4*0.8 = 1
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# OK, så der er selektivitet.
# OPGAVE 3.
# 3.1 I hvilken minimumsdybde skal kabler i jord i et landbrugsområde nedgraves i, hvis jorden er dyrkelig?
# DS/HD 60364 pkt. 705.522:
# Mindst 1 m.
# 3.2 Et parcelhus er opført år 2018, i dette parcelhus er der bl.a. et børneværelse, på 17 m^2. Hvor mange stikkontakter skal der mindst være installeret i børneværelset?
# BEK 1082/2016 §57:
# 17 m^2/(4 m^2) = 4.25 , 5 stk. stikkontakter.
# 3.3 I hvilket tilfælde kan man undlade at fremføre beskyttelsestederen in en boliginstallation, under forusætning af, at boligen er beskyttet af en RCD med I_Δn == 30 mA.
# BEK 1082/2016 §54 og 63:
# Ved udvidelse eller ændring af en eksisterende elektrisk installation med højst to tilslutningssterder.
# 3.4 Nævn de situationer hvor kortslutnings beskyttelsesudstyret ikke behøver at være placeret i ledernes udgangspunkt.
# DS/HD60364 pkt. 434.2.1:
# Ikke brænd og eksplosions risiko, ingen afgreninger eller stikkontaker, maks 3 m, risiko for kortslutning er reduceret og ikke i nærheden af brændbart materiale.
#
# DS/HD60364 pkt. 434.3:
# Risiko for kortslutning er reduceret og ikke i nærheden af brændbart materiale. Fra generatorer, transformere, ensrettere og akkumulatorbatterier, hvor afbrydelse kan medføre fare, visse målekredse. Hvor forsyningsselskabet har sørget for kortslutningsbeskyttelsen.
# 3.5 Der er fremført en separat beskyttelsesleder på 25 mm^2Cu. Hvor stort er det tilladelige energigennemslip på den beskyttelsesleder?
# Jeg antager, at beskyttelseslederen er et 70°C kabel og som er placeret tæt op ad faselederne:
S := 25 mm^2
k := 115*sqrt(s) A/mm^2
(S*k)^2 = 8.26562 s*kA^2
# 3.6 I Hvilke tilfælde i et IT-system er det ikke nødvendigt at foretage en overstrømsdetektering i nullederen?
# DS/HD60364 pkt. 431.2.2:
# -Hvis den pågældende nulleder er effektivt beskyttet mod overstrøm af beskyttelsesudstyr anbragt på forsyningssiden, fx ved installationens forsyningspunkt, eller hvis
#
# -den pågældende strømkreds er beskyttet af en RCD (fejlstrømsaybryder) med en mærkeudløseren, der ikke er spændingsførende leder i den pågældende strømkreds. RCD'en (fejlstrømsafbryderen) skal have tilstrækkelig brydeevne i alle poler.
# 3.7 Hvornår skal der foretages beskyttelse mod overspænding uanset resultat af evt. risikovudering?
# DS/HD60364 pkt. 443.4:
# a) Menneskeliv, fx sikkerhedssystemer, lægebehandlingsfaciliteter.
# b) Offentlige serviceydelser og kulturarv, fx hoteller, bander, industrier, handel, landbrug.
# c) Et strort antal personer, fx store bygninger, kontorer, skoler.
# 3.8 Hvilket tværsnit skal en beskyttelsesleder minimum have, når den ikke er en del af et kabel, eller ikke er i en fælles kapsling med faselederne?
# DS/HD60364 pkt. 543.1.3:
# - 2.5 mm^2Cu eller 16 mm^2Al, hvis der er beskyttelse mod mekanisk beskadigelse.
# - 4 mm^2Cu eller 16 mm^2Al, hvis der ikke er beskyttelse mod mekanisk skade.
# 3.9 Hvad er definitionen på dobbelt isolation i henhold til IEV 195?
# DS/HD60364 pkt. IEVref 195-06-08 :
# Isolation, som omfatter både grundisolation og tillaægsisolation.
# 3.10 Hvis der i et TT-system anvendes en RCD på I_Δn := 30 mA, hvor stort må modstanden R_A være i Ω?
# DS/HD60364 Tabel 1:
# R_A == 1666 Ω
# ELLER:
# DS/HD60364 pkt. 411.5.3:
# R_A*I_Δn ≤ 50 V  R_A := 50 V/I_Δn = 1666.67 Ω
